# OpenSim document version 30000
Model WalkerModel:
  credits: Daniel A. Jacobs, Ajay Seth
  length_units: meters
  force_units: N
  gravity: 0 -9.80665 0
  BodySet:
    Body ground: mass=0 mass_center=(0 0 0) inertia_xx=0 inertia_yy=0 inertia_zz=0 meshes=treadmill.vtp
    Body LeftThigh: mass=0.05 mass_center=(0 0 0) inertia_xx=0.0001 inertia_yy=0.0001 inertia_zz=0.001041667
        meshes=cylinder.vtp
      PinJoint LThighToPelvis: parent_body=ground location_in_parent=(0 0 -0.2) location=(0 0.25 0)
        Coordinate LHip_rz: motion_type=rotational default_value=1.047198 range=(-1.745329 1.745329)
