# OpenSim document version 30000
Model arm26:
  length_units: meters
  force_units: N
  gravity: 0 -9.8066 0
  credits:
    The OpenSim Development Team (Reinbolt, J; Seth, A; Habib, A; Hamner, S) adapted from a model originally created by Kate Holzbaur (11/22/04) License: Creative Commons (CCBY 3.0). You are free to distribute, remix, tweak, and build upon this work, even commercially, as long as you credit us for the original creation. http://creativecommons.org/licenses/by/3.0/
  publications:
    Holzbaur, K.R.S., Murray, W.M., Delp, S.L. A Model of the Upper Extremity for Simulating Musculoskeletal Surgery and Analyzing Neuromuscular Control. Annals of Biomedical Engineering, vol 33, pp 829–840, 2005
  BodySet:
    Body ground: mass=0 mass_center=(0 0 0) inertia_xx=0 inertia_yy=0 inertia_zz=0
    Body block: mass=126 mass_center=(0.05 0.63 0.05) inertia_xx=67.0992 inertia_yy=0.84 inertia_zz=67.0992
        inertia_xy=3.969 inertia_xz=0.315 inertia_yz=3.969 meshes=box_geometry.STL
      WeldJoint ground_block: parent_body=ground location_in_parent=(0 0 0) location=(0 0 0)
    Body motor_housing: mass=3.180862 mass_center=(0 0 0.025) inertia_xx=0.00426103 inertia_yy=0.00426103
        inertia_zz=0.00322062 meshes=motor_housing_geometry.STL
      WeldJoint block_motor-housing: parent_body=block location_in_parent=(0.005 1.13 -0.05) location=(0 0 0)
    Body robot_link: mass=0.6439437 mass_center=(0 0 0.2) inertia_xx=0.03437313 inertia_yy=0.03437313
        inertia_zz=5.892e-5 meshes=link_geometry_metres.STL
      CustomJoint motor_pin: parent_body=motor_housing location_in_parent=(0.045 0.045 0.025)
          orientation_in_parent=(1.578 0 0) location=(0.0135 0.0135 0)
        Coordinate robot_arm: motion_type=rotational default_value=0 range=(0.1848 2.9568) clamped=false
        SpatialTransform: axes_held_at_zero=(rotation2 rotation3 translation1 translation2 translation3)
          TransformAxis rotation1: coordinates=robot_arm axis=(0 1 0) LinearFunction(coefficients=1 0)
    Body robot_link_2: mass=0.6439437 mass_center=(0 0 0.2) inertia_xx=0.03437313 inertia_yy=0.03437313
        inertia_zz=5.892e-5 meshes=link_geometry_metres.STL
      CustomJoint motor_pin: parent_body=robot_link location_in_parent=(0.0135 0.0135 0.4) location=(0.0135 0.0135 0)
        Coordinate robot_arm: motion_type=rotational default_value=0 range=(0.1848 2.9568) clamped=false
        SpatialTransform: axes_held_at_zero=(rotation2 rotation3 translation1 translation2 translation3)
          TransformAxis rotation1: coordinates=robot_arm axis=(0 1 0) LinearFunction(coefficients=1 0)
  ForceSet:
    CoordinateLimitForce SpringLimiter: isDisabled=true coordinate=robot_arm upper_limit=169.411 [degrees]
        lower_stiffness=2 [N*m/degree] lower_limit=50 [degrees] damping=0.1 transition=20 [degrees]
