# OpenSim document version 20302
ForceSet gait2392_CMC:
  PointActuator [values shared by the 6 below unless stated]: point_is_global=false force_is_global=true
  PointActuator FX: body=pelvis point=(-0.0724376 0 0) direction=(1 0 0) optimal_force=100
  PointActuator FY: body=pelvis point=(-0.0724376 0 0) direction=(0 1 0) optimal_force=200
  PointActuator FZ: body=pelvis point=(-0.0724376 0 0) direction=(0 0 1) optimal_force=100
  TorqueActuator [values shared by the 6 below unless stated]: bodyB=ground torque_is_global=true optimal_force=80
  TorqueActuator MX: bodyA=pelvis axis=(1 0 0)
  TorqueActuator MY: bodyA=pelvis axis=(0 1 0)
  TorqueActuator MZ: bodyA=pelvis axis=(0 0 1)
  CoordinateActuator hip_flexion_r_reserve: coordinate=hip_flexion_r optimal_force=1
  CoordinateActuator hip_adduction_r_reserve: coordinate=hip_adduction_r optimal_force=1
  CoordinateActuator hip_rotation_r_reserve: coordinate=hip_rotation_r optimal_force=1
  CoordinateActuator knee_angle_r_reserve: coordinate=knee_angle_r optimal_force=1
  CoordinateActuator ankle_angle_r_reserve: coordinate=ankle_angle_r optimal_force=1
  CoordinateActuator subtalar_angle_r_reserve: coordinate=subtalar_angle_r optimal_force=1
  CoordinateActuator mtp_angle_r_reserve: coordinate=mtp_angle_r optimal_force=100
  CoordinateActuator hip_flexion_l_reserve: coordinate=hip_flexion_l optimal_force=1
  CoordinateActuator hip_adduction_l_reserve: coordinate=hip_adduction_l optimal_force=1
  CoordinateActuator hip_rotation_l_reserve: coordinate=hip_rotation_l optimal_force=1
  CoordinateActuator knee_angle_l_reserve: coordinate=knee_angle_l optimal_force=1
  CoordinateActuator ankle_angle_l_reserve: coordinate=ankle_angle_l optimal_force=1
  CoordinateActuator subtalar_angle_l_reserve: coordinate=subtalar_angle_l optimal_force=1
  CoordinateActuator mtp_angle_l_reserve: coordinate=mtp_angle_l optimal_force=100
  CoordinateActuator lumbar_extension_reserve: coordinate=lumbar_extension optimal_force=1
  CoordinateActuator lumbar_bending_reserve: coordinate=lumbar_bending optimal_force=1
  CoordinateActuator lumbar_rotation_reserve: coordinate=lumbar_rotation optimal_force=1
  PointActuator XoR2_FX: body=XoR2_back point=(0.0708701 -0.141249 -2.848e-5) direction=(1 0 0) optimal_force=100
  PointActuator XoR2_FY: body=XoR2_back point=(0.0708701 -0.141249 -2.848e-5) direction=(0 1 0) optimal_force=200
  PointActuator XoR2_FZ: body=XoR2_back point=(0.0708701 -0.141249 -2.848e-5) direction=(0 0 1) optimal_force=100
  TorqueActuator XoR2_MX: bodyA=XoR2_back axis=(1 0 0)
  TorqueActuator XoR2_MY: bodyA=XoR2_back axis=(0 1 0)
  TorqueActuator XoR2_MZ: bodyA=XoR2_back axis=(0 0 1)
  CoordinateActuator XoR2_hip_adduction_r_reserve: coordinate=XoR2_hip_adduction_r optimal_force=1
  CoordinateActuator XoR2_hip_angle_r_reserve: coordinate=XoR2_hip_angle_r optimal_force=1
  CoordinateActuator XoR2_knee_angle_r_reserve: coordinate=XoR2_knee_angle_r optimal_force=1
  CoordinateActuator XoR2_ankle_angle_r_reserve: coordinate=XoR2_ankle_angle_r optimal_force=1
  CoordinateActuator XoR2_hip_adduction_l_reserve: coordinate=XoR2_hip_adduction_l optimal_force=1
  CoordinateActuator XoR2_hip_angle_l_reserve: coordinate=XoR2_hip_angle_l optimal_force=1
  CoordinateActuator XoR2_knee_angle_l_reserve: coordinate=XoR2_knee_angle_l optimal_force=1
  CoordinateActuator XoR2_ankle_angle_l_reserve: coordinate=XoR2_ankle_angle_l optimal_force=1
