# OpenSim document version 30000
Model XoR2-Human:
  length_units: meters
  force_units: N
  gravity: 0 -9.80665 0
  credits:
    Delp S.L., Loan J.P., Hoy M.G., Zajac F.E., Topp E.L., Rosen J.M., Thelen D.G., Anderson F.C., Seth A. Notes: 3D, 23 DOF gait model created by D.G. Thelen, Univ. of Wisconsin-Madison, and Ajay Seth, Frank C. Anderson, and Scott L. Delp, Stanford University. Lower extremity joint defintions based on Delp et al. (1990). Low back joint and anthropometry based on Anderson and Pandy (1999, 2001). Planar knee model of Yamaguchi and Zajac (1989). Seth replaced tibia translation constraints with a CustomJoint for the knee and removed the patella to eliminate all kinematic constraints; insertions of the quadrucepts are handled with moving points in the tibia frame as defined by Delp 1990. License: Creative Commons (CCBY 3.0). You are free to distribute, remix, tweak, and build upon this work, even commercially, as long as you credit us for the original creation. http://creativecommons.org/licenses/by/3.0/ More Information: http://simtk-confluence.stanford.edu:8080/display/OpenSim/Gait+2392+and+2354+Models
  publications:
    Delp, S.L., Loan, J.P., Hoy, M.G., Zajac, F.E., Topp E.L., Rosen, J.M.: An interactive graphics-based model of the lower extremity to study orthopaedic surgical procedures, IEEE Transactions on Biomedical Engineering, vol. 37, pp. 757-767, 1990. Yamaguchi G.T., Zajac F.E.: A planar model of the knee joint to characterize the knee extensor mechanism." J . Biomecl7. vol. 21. pp. 1-10. 1989. Anderson F.C., Pandy M.G.: A dynamic optimization solution for vertical jumping in three dimensions. Computer Methods in Biomechanics and Biomedical Engineering 2:201-231, 1999. Anderson F.C., Pandy M.G.: Dynamic optimization of human walking. Journal of Biomechanical Engineering 123:381-390, 2001.
  BodySet:
    Body ground: mass=0 mass_center=(0 0 0) inertia_xx=0 inertia_yy=0 inertia_zz=0 meshes=treadmill.vtp
    Body pelvis: mass=11.777 mass_center=(-0.0707 0 0) inertia_xx=0.1028 inertia_yy=0.0871 inertia_zz=0.0579
        meshes=(sacrum.vtp pelvis.vtp l_pelvis.vtp)
      CustomJoint ground_pelvis: parent_body=ground location_in_parent=(0 0 0) location=(0 0 0)
        Coordinate pelvis_tilt: motion_type=rotational default_value=-0.05026434 range=(-1.570796 1.570796)
            clamped=false
        Coordinate pelvis_list: motion_type=rotational default_value=-0.01126894 range=(-1.570796 1.570796)
            clamped=false
        Coordinate pelvis_rotation: motion_type=rotational default_value=-0.05152985 range=(-1.570796 1.570796)
            clamped=false
        Coordinate pelvis_tx: motion_type=translational default_value=0.03977249 range=(-5 5) clamped=false
        Coordinate pelvis_ty: motion_type=translational default_value=0.9722295 range=(-1 2) clamped=false
        Coordinate pelvis_tz: motion_type=translational default_value=-0.02879545 range=(-3 3) clamped=false
        SpatialTransform:
          TransformAxis rotation1: coordinates=pelvis_tilt axis=(0 0 1) LinearFunction(coefficients=1 0)
          TransformAxis rotation2: coordinates=pelvis_list axis=(1 0 0) LinearFunction(coefficients=1 0)
          TransformAxis rotation3: coordinates=pelvis_rotation axis=(0 1 0) LinearFunction(coefficients=1 0)
          TransformAxis translation1: coordinates=pelvis_tx axis=(1 0 0) LinearFunction(coefficients=1 0)
          TransformAxis translation2: coordinates=pelvis_ty axis=(0 1 0) LinearFunction(coefficients=1 0)
          TransformAxis translation3: coordinates=pelvis_tz axis=(0 0 1) LinearFunction(coefficients=1 0)
    Body femur_r: mass=9.3014 mass_center=(0 -0.17 0) inertia_xx=0.1339 inertia_yy=0.0351 inertia_zz=0.1412
        meshes=femur.vtp
      CustomJoint hip_r: parent_body=pelvis location_in_parent=(-0.0707 -0.0661 0.0835) location=(0 0 0)
        Coordinate hip_flexion_r: motion_type=rotational default_value=0.5981787 range=(-2.094395 2.094395)
            clamped=false
        Coordinate hip_adduction_r: motion_type=rotational default_value=-0.0872612 range=(-2.094395 2.094395)
            clamped=false
        Coordinate hip_rotation_r: motion_type=rotational default_value=-0.1196276 range=(-2.094395 2.094395)
            clamped=false
        SpatialTransform: axes_held_at_zero=(translation1 translation2 translation3)
          TransformAxis rotation1: coordinates=hip_flexion_r axis=(0 0 1) LinearFunction(coefficients=1 0)
          TransformAxis rotation2: coordinates=hip_adduction_r axis=(1 0 0) LinearFunction(coefficients=1 0)
          TransformAxis rotation3: coordinates=hip_rotation_r axis=(0 1 0) LinearFunction(coefficients=1 0)
    Body bushing_thigh_r: mass=0 mass_center=(0 0 0) inertia_xx=0.05 inertia_yy=0.05 inertia_zz=0.05 meshes=sphere.vtp
      WeldJoint bushing_thigh_r_weld: parent_body=femur_r location_in_parent=(-0.00702248 -0.229577 0.0546573)
          location=(0 0 0)
    Body tibia_r: mass=3.7075 mass_center=(0 -0.1867 0) inertia_xx=0.0504 inertia_yy=0.0051 inertia_zz=0.0511
        meshes=(tibia.vtp fibula.vtp)
      CustomJoint knee_r: parent_body=femur_r location_in_parent=(0 0 0) location=(0 0 0)
        Coordinate knee_angle_r: motion_type=rotational default_value=-0.7390183 range=(-2.094395 0.1745329)
            clamped=false
        SpatialTransform: axes_held_at_zero=(rotation2 rotation3 translation3)
          TransformAxis rotation1: coordinates=knee_angle_r axis=(0 0 1) LinearFunction(coefficients=1 0)
          TransformAxis translation1: coordinates=knee_angle_r axis=(1 0 0)
            SimmSpline: x=(-2.0944 -1.74533 -1.39626 -1.0472 -0.698132 -0.349066 -0.174533 0.197344 0.337395 0.490178 1.52146 2.0944)
                y=(-0.0032 0.00179 0.00411 0.0041 0.00212 -0.001 -0.0031 -0.005227 -0.005435 -0.005574 -0.005435 -0.00525)
          TransformAxis translation2: coordinates=knee_angle_r axis=(0 1 0)
            SimmSpline: x=(-2.0944 -1.22173 -0.523599 -0.349066 -0.174533 0.159149 2.0944)
                y=(-0.4226 -0.4082 -0.399 -0.3976 -0.3966 -0.395264 -0.396)
    Body bushing_shank_r: mass=0 mass_center=(0 0 0) inertia_xx=0.05 inertia_yy=0.05 inertia_zz=0.05 meshes=sphere.vtp
      WeldJoint bushing_shank_r_weld: parent_body=tibia_r location_in_parent=(0.0124617 -0.211872 0.0247653)
          location=(0 0 0)
    Body talus_r: mass=0.1 mass_center=(0 0 0) inertia_xx=0.001 inertia_yy=0.001 inertia_zz=0.001 meshes=talus.vtp
      CustomJoint ankle_r: parent_body=tibia_r location_in_parent=(0 -0.43 0) location=(0 0 0)
        Coordinate ankle_angle_r: motion_type=rotational default_value=0.3367169 range=(-1.570796 1.570796)
            clamped=false
        SpatialTransform: axes_held_at_zero=(rotation2 rotation3 translation1 translation2 translation3)
          TransformAxis rotation1: coordinates=ankle_angle_r axis=(-0.1050135 -0.1740224 0.9791263)
              LinearFunction(coefficients=1 0)
    Body calcn_r: mass=1.25 mass_center=(0.1 0.03 0) inertia_xx=0.0014 inertia_yy=0.0039 inertia_zz=0.0041
        meshes=foot.vtp
      CustomJoint subtalar_r: parent_body=talus_r location_in_parent=(-0.04877 -0.04195 0.00792) location=(0 0 0)
        Coordinate subtalar_angle_r: motion_type=rotational default_value=0 range=(-1.570796 1.570796) clamped=false
            locked=true
        SpatialTransform: axes_held_at_zero=(rotation2 rotation3 translation1 translation2 translation3)
          TransformAxis rotation1: coordinates=subtalar_angle_r axis=(0.7871796 0.6047475 -0.1209495)
              LinearFunction(coefficients=1 0)
    Body toes_r: mass=0.2166 mass_center=(0.0346 0.006 -0.0175) inertia_xx=0.0001 inertia_yy=0.0002 inertia_zz=0.0001
        meshes=bofoot.vtp
      CustomJoint mtp_r: parent_body=calcn_r location_in_parent=(0.1788 -0.002 0.00108) location=(0 0 0)
        Coordinate mtp_angle_r: motion_type=rotational default_value=0 range=(-1.570796 1.570796) clamped=false
            locked=true
        SpatialTransform: axes_held_at_zero=(rotation2 rotation3 translation1 translation2 translation3)
          TransformAxis rotation1: coordinates=mtp_angle_r axis=(-0.5809544 0 0.8139361)
              LinearFunction(coefficients=1 0)
    Body femur_l: mass=9.3014 mass_center=(0 -0.17 0) inertia_xx=0.1339 inertia_yy=0.0351 inertia_zz=0.1412
        meshes=l_femur.vtp
      CustomJoint hip_l: parent_body=pelvis location_in_parent=(-0.0707 -0.0661 -0.0835) location=(0 0 0)
        Coordinate hip_flexion_l: motion_type=rotational default_value=0.03204543 range=(-2.094395 2.094395)
            clamped=false
        Coordinate hip_adduction_l: motion_type=rotational default_value=-0.02161324 range=(-2.094395 2.094395)
            clamped=false
        Coordinate hip_rotation_l: motion_type=rotational default_value=-0.03539234 range=(-2.094395 2.094395)
            clamped=false
        SpatialTransform: axes_held_at_zero=(translation1 translation2 translation3)
          TransformAxis rotation1: coordinates=hip_flexion_l axis=(0 0 1) LinearFunction(coefficients=1 0)
          TransformAxis rotation2: coordinates=hip_adduction_l axis=(-1 0 0) LinearFunction(coefficients=1 0)
          TransformAxis rotation3: coordinates=hip_rotation_l axis=(0 -1 0) LinearFunction(coefficients=1 0)
    Body bushing_thigh_l: mass=0 mass_center=(0 0 0) inertia_xx=0.05 inertia_yy=0.05 inertia_zz=0.05 meshes=sphere.vtp
      WeldJoint bushing_thigh_l_weld: parent_body=femur_l location_in_parent=(0.00709862 -0.218781 -0.0501948)
          location=(0 0 0)
    Body tibia_l: mass=3.7075 mass_center=(0 -0.1867 0) inertia_xx=0.0504 inertia_yy=0.0051 inertia_zz=0.0511
        meshes=(l_tibia.vtp l_fibula.vtp)
      CustomJoint knee_l: parent_body=femur_l location_in_parent=(0 0 0) location=(0 0 0)
        Coordinate knee_angle_l: motion_type=rotational default_value=-0.1794626 range=(-2.094395 0.1745329)
            clamped=false
        SpatialTransform: axes_held_at_zero=(rotation2 rotation3 translation3)
          TransformAxis rotation1: coordinates=knee_angle_l axis=(0 0 1) LinearFunction(coefficients=1 0)
          TransformAxis translation1: coordinates=knee_angle_l axis=(1 0 0)
            SimmSpline: x=(-2.0944 -1.74533 -1.39626 -1.0472 -0.698132 -0.349066 -0.174533 0.197344 0.337395 0.490178 1.52146 2.0944)
                y=(-0.0032 0.00179 0.00411 0.0041 0.00212 -0.001 -0.0031 -0.005227 -0.005435 -0.005574 -0.005435 -0.00525)
          TransformAxis translation2: coordinates=knee_angle_l axis=(0 1 0)
            SimmSpline: x=(-2.0944 -1.22173 -0.523599 -0.349066 -0.174533 0.159149 2.0944)
                y=(-0.4226 -0.4082 -0.399 -0.3976 -0.3966 -0.395264 -0.396)
    Body bushing_shank_l: mass=0 mass_center=(0 0 0) inertia_xx=0.05 inertia_yy=0.05 inertia_zz=0.05 meshes=sphere.vtp
      WeldJoint bushing_shank_l_weld: parent_body=tibia_l location_in_parent=(0.0264148 -0.208667 -0.0278557)
          location=(0 0 0)
    Body talus_l: mass=0.1 mass_center=(0 0 0) inertia_xx=0.001 inertia_yy=0.001 inertia_zz=0.001 meshes=l_talus.vtp
      CustomJoint ankle_l: parent_body=tibia_l location_in_parent=(0 -0.43 0) location=(0 0 0)
        Coordinate ankle_angle_l: motion_type=rotational default_value=0.04640314 range=(-1.047198 1.047198)
            clamped=false
        SpatialTransform: axes_held_at_zero=(rotation2 rotation3 translation1 translation2 translation3)
          TransformAxis rotation1: coordinates=ankle_angle_l axis=(0.1050135 0.1740224 0.9791263)
              LinearFunction(coefficients=1 0)
    Body calcn_l: mass=1.25 mass_center=(0.1 0.03 0) inertia_xx=0.0014 inertia_yy=0.0039 inertia_zz=0.0041
        meshes=l_foot.vtp
      CustomJoint subtalar_l: parent_body=talus_l location_in_parent=(-0.04877 -0.04195 -0.00792) location=(0 0 0)
        Coordinate subtalar_angle_l: motion_type=rotational default_value=0 range=(-1.570796 1.570796) clamped=false
            locked=true
        SpatialTransform: axes_held_at_zero=(rotation2 rotation3 translation1 translation2 translation3)
          TransformAxis rotation1: coordinates=subtalar_angle_l axis=(-0.7871796 -0.6047475 -0.1209495)
              LinearFunction(coefficients=1 0)
    Body toes_l: mass=0.2166 mass_center=(0.0346 0.006 0.0175) inertia_xx=0.0001 inertia_yy=0.0002 inertia_zz=0.0001
        meshes=l_bofoot.vtp
      CustomJoint mtp_l: parent_body=calcn_l location_in_parent=(0.1788 -0.002 -0.00108) location=(0 0 0)
        Coordinate mtp_angle_l: motion_type=rotational default_value=0 range=(-1.047198 1.047198) clamped=false
            locked=true
        SpatialTransform: axes_held_at_zero=(rotation2 rotation3 translation1 translation2 translation3)
          TransformAxis rotation1: coordinates=mtp_angle_l axis=(0.5809544 0 0.8139361)
              LinearFunction(coefficients=1 0)
    Body torso: mass=34.2366 mass_center=(-0.03 0.32 0) inertia_xx=1.4745 inertia_yy=0.7555 inertia_zz=1.4314
        meshes=(hat_spine.vtp hat_jaw.vtp hat_skull.vtp hat_ribs.vtp)
      CustomJoint back: parent_body=pelvis location_in_parent=(-0.1007 0.0815 0) location=(0 0 0)
        Coordinate lumbar_extension: motion_type=rotational default_value=-0.2387274 range=(-1.570796 1.570796)
            clamped=false
        Coordinate lumbar_bending: motion_type=rotational default_value=-0.07539074 range=(-1.570796 1.570796)
            clamped=false
        Coordinate lumbar_rotation: motion_type=rotational default_value=0.01825789 range=(-1.570796 1.570796)
            clamped=false
        SpatialTransform: axes_held_at_zero=(translation1 translation2 translation3)
          TransformAxis rotation1: coordinates=lumbar_extension axis=(0 0 1) LinearFunction(coefficients=1 0)
          TransformAxis rotation2: coordinates=lumbar_bending axis=(1 0 0) LinearFunction(coefficients=1 0)
          TransformAxis rotation3: coordinates=lumbar_rotation axis=(0 1 0) LinearFunction(coefficients=1 0)
    Body XoR2_back: mass=3.981076 mass_center=(0.0708701 -0.141249 -2.848e-5) inertia_xx=-0.1196586
        inertia_yy=0.05364227 inertia_zz=0.1266665 inertia_xy=-0.03199447 inertia_xz=5.27e-6 inertia_yz=-3.11e-6
        meshes=../geometry/back.stl
      CustomJoint ground_XoR2_back: parent_body=ground location_in_parent=(0 0 0) location=(0 0 0)
        Coordinate XoR2_tilt: motion_type=rotational default_value=-0.05026434 range=(-1.570796 1.570796) clamped=false
        Coordinate XoR2_list: motion_type=rotational default_value=-0.01126894 range=(-1.570796 1.570796) clamped=false
        Coordinate XoR2_rotation: motion_type=rotational default_value=-0.05152985 range=(-1.570796 1.570796)
            clamped=false
        Coordinate XoR2_tx: motion_type=translational default_value=-0.1142275 range=(-5 5) clamped=false
        Coordinate XoR2_ty: motion_type=translational default_value=1.050229 range=(-1 2) clamped=false
        Coordinate XoR2_tz: motion_type=translational default_value=-0.02879545 range=(-3 3) clamped=false
        SpatialTransform:
          TransformAxis rotation1: coordinates=XoR2_tilt axis=(0 0 1) LinearFunction(coefficients=1 0)
          TransformAxis rotation2: coordinates=XoR2_list axis=(1 0 0) LinearFunction(coefficients=1 0)
          TransformAxis rotation3: coordinates=XoR2_rotation axis=(0 1 0) LinearFunction(coefficients=1 0)
          TransformAxis translation1: coordinates=XoR2_tx axis=(1 0 0) LinearFunction(coefficients=1 0)
          TransformAxis translation2: coordinates=XoR2_ty axis=(0 1 0) LinearFunction(coefficients=1 0)
          TransformAxis translation3: coordinates=XoR2_tz axis=(0 0 1) LinearFunction(coefficients=1 0)
    Body XoR2_link_r: mass=0.08966161 mass_center=(0.00170274 -0.0446501 0.0144736) inertia_xx=7.373e-5
        inertia_yy=8.562e-5 inertia_zz=0.00012021 inertia_xy=-1.392e-5 inertia_xz=2.19e-6 inertia_yz=-1.772e-5
        meshes=../geometry/right-link.stl
      CustomJoint passive_r: parent_body=XoR2_back location_in_parent=(0.09311723 -0.09972573 0.194) location=(0 0 0)
        Coordinate XoR2_hip_adduction_r: motion_type=rotational default_value=2.244017e-8 range=(-6.283185 6.283185)
            clamped=false
        SpatialTransform: axes_held_at_zero=(translation1 translation2 translation3)
          TransformAxis rotation1: axis=(0 0 1) LinearFunction(coefficients=0 0)
          TransformAxis rotation2: coordinates=XoR2_hip_adduction_r axis=(1 0 0) LinearFunction(coefficients=1 0)
          TransformAxis rotation3: axis=(0 1 0) LinearFunction(coefficients=0 0)
    Body XoR2_thigh_r: mass=1.448699 mass_center=(0.00048619 -0.184416 0.0292295) inertia_xx=0.02310115
        inertia_yy=0.00269942 inertia_zz=0.02446539 inertia_xy=0.00061339 inertia_xz=6.64e-6 inertia_yz=-0.00010281
        meshes=../geometry/right-thigh.stl
      CustomJoint XoR2_hip_r: parent_body=XoR2_link_r location_in_parent=(0.015 -0.065 0.01015) location=(0 0 0)
        Coordinate XoR2_hip_angle_r: motion_type=rotational default_value=0.5981787 range=(-6.283185 6.283185)
            clamped=false
        SpatialTransform: axes_held_at_zero=(rotation2 rotation3 translation1 translation2 translation3)
          TransformAxis rotation1: coordinates=XoR2_hip_angle_r axis=(0 0 1) LinearFunction(coefficients=1 0)
    Body bushing_XoR2_thigh_r: mass=0 mass_center=(0 0 0) inertia_xx=0.05 inertia_yy=0.05 inertia_zz=0.05
        meshes=sphere.vtp
      WeldJoint bushing_XoR2_thigh_r_weld: parent_body=XoR2_thigh_r
          location_in_parent=(-0.0151018 -0.188505 -0.0563305) location=(0 0 0)
    Body XoR2_shank_r: mass=0.8351127 mass_center=(0.0315478 -0.192321 -0.00893206) inertia_xx=0.01678467
        inertia_yy=0.00226739 inertia_zz=0.0183526 inertia_xy=0.00312197 inertia_xz=-2.412e-5 inertia_yz=-0.0002615
        meshes=../geometry/right-shank.stl
      CustomJoint XoR2_knee_r: parent_body=XoR2_thigh_r location_in_parent=(0 -0.38 0.0287) location=(0 0 0)
        Coordinate XoR2_knee_angle_r: motion_type=rotational default_value=-0.7390183 range=(-6.283185 6.283185)
            clamped=false
        SpatialTransform: axes_held_at_zero=(rotation2 rotation3 translation1 translation2 translation3)
          TransformAxis rotation1: coordinates=XoR2_knee_angle_r axis=(0 0 1) LinearFunction(coefficients=1 0)
    Body bushing_XoR2_shank_r: mass=0 mass_center=(0 0 0) inertia_xx=0.05 inertia_yy=0.05 inertia_zz=0.05
        meshes=sphere.vtp
      WeldJoint bushing_XoR2_shank_r_weld: parent_body=XoR2_shank_r location_in_parent=(0 -0.2 -0.1) location=(0 0 0)
    Body XoR2_foot_r: mass=1.175042 mass_center=(0.0444916 -0.105543 -0.0698363) inertia_xx=0.00391055
        inertia_yy=0.00835104 inertia_zz=0.00832028 inertia_xy=-0.00088946 inertia_xz=-0.00063668 inertia_yz=0.00128741
        meshes=../geometry/right-foot.stl
      CustomJoint XoR2_ankle_r: parent_body=XoR2_shank_r location_in_parent=(0 -0.38 -0.00345) location=(0 0 0)
        Coordinate XoR2_ankle_angle_r: motion_type=rotational default_value=0.3367169 range=(-6.283185 6.283185)
            clamped=false
        SpatialTransform: axes_held_at_zero=(rotation2 rotation3 translation1 translation2 translation3)
          TransformAxis rotation1: coordinates=XoR2_ankle_angle_r axis=(0 0 1) LinearFunction(coefficients=1 0)
    Body XoR2_link_l: mass=0.08966159 mass_center=(0.00170275 -0.0446501 -0.0144736) inertia_xx=7.373e-5
        inertia_yy=8.562e-5 inertia_zz=0.00012021 inertia_xy=-1.392e-5 inertia_xz=-2.19e-6 inertia_yz=1.772e-5
        meshes=../geometry/left-link.stl
      CustomJoint passive_l: parent_body=XoR2_back location_in_parent=(0.09311723 -0.09972573 -0.194) location=(0 0 0)
        Coordinate XoR2_hip_adduction_l: motion_type=rotational default_value=2.244017e-8 range=(-6.283185 6.283185)
            clamped=false
        SpatialTransform: axes_held_at_zero=(translation1 translation2 translation3)
          TransformAxis rotation1: axis=(0 0 1) LinearFunction(coefficients=0 0)
          TransformAxis rotation2: coordinates=XoR2_hip_adduction_l axis=(1 0 0) LinearFunction(coefficients=1 0)
          TransformAxis rotation3: axis=(0 1 0) LinearFunction(coefficients=0 0)
    Body XoR2_thigh_l: mass=1.29348 mass_center=(0.0004862 -0.184415 0.0295044) inertia_xx=0.02062602
        inertia_yy=0.0024102 inertia_zz=0.02184409 inertia_xy=0.00054767 inertia_xz=-5.93e-6 inertia_yz=9.18e-5
        meshes=../geometry/left-thigh.stl
      CustomJoint XoR2_hip_l: parent_body=XoR2_link_l location_in_parent=(0.015 -0.065 -0.009875) location=(0 0 0)
        Coordinate XoR2_hip_angle_l: motion_type=rotational default_value=0.03204543 range=(-6.283185 6.283185)
            clamped=false
        SpatialTransform: axes_held_at_zero=(rotation2 rotation3 translation1 translation2 translation3)
          TransformAxis rotation1: coordinates=XoR2_hip_angle_l axis=(0 0 1) LinearFunction(coefficients=1 0)
    Body bushing_XoR2_thigh_l: mass=0 mass_center=(0 0 0) inertia_xx=0.05 inertia_yy=0.05 inertia_zz=0.05
        meshes=sphere.vtp
      WeldJoint bushing_XoR2_thigh_l_weld: parent_body=XoR2_thigh_l location_in_parent=(-0.0151018 -0.188505 0.0563305)
          location=(0 0 0)
    Body XoR2_shank_l: mass=0.8351123 mass_center=(0.0315476 -0.192321 -0.00893209) inertia_xx=0.01678466
        inertia_yy=0.00226739 inertia_zz=0.01835259 inertia_xy=0.00312197 inertia_xz=2.412e-5 inertia_yz=0.0002615
        meshes=../geometry/left-shank.stl
      CustomJoint XoR2_knee_l: parent_body=XoR2_thigh_l location_in_parent=(0 -0.38 -0.028975) location=(0 0 0)
        Coordinate XoR2_knee_angle_l: motion_type=rotational default_value=-0.1794626 range=(-6.283185 6.283185)
            clamped=false
        SpatialTransform: axes_held_at_zero=(rotation2 rotation3 translation1 translation2 translation3)
          TransformAxis rotation1: coordinates=XoR2_knee_angle_l axis=(0 0 1) LinearFunction(coefficients=1 0)
    Body bushing_XoR2_shank_l: mass=0 mass_center=(0 0 0) inertia_xx=0.05 inertia_yy=0.05 inertia_zz=0.05
        meshes=sphere.vtp
      WeldJoint bushing_XoR2_shank_l_weld: parent_body=XoR2_shank_l location_in_parent=(0 -0.2 0.1) location=(0 0 0)
    Body XoR2_foot_l: mass=1.175041 mass_center=(0.0444917 -0.105543 0.0689863) inertia_xx=0.00391055
        inertia_yy=0.00835104 inertia_zz=0.00832028 inertia_xy=-0.00088946 inertia_xz=0.00063668 inertia_yz=-0.00128741
        meshes=../geometry/left-foot.stl
      CustomJoint XoR2_ankle_l: parent_body=XoR2_shank_l location_in_parent=(0 -0.38 0.0043) location=(0 0 0)
        Coordinate XoR2_ankle_angle_l: motion_type=rotational default_value=0.04640314 range=(-6.283185 6.283185)
            clamped=false
        SpatialTransform: axes_held_at_zero=(rotation2 rotation3 translation1 translation2 translation3)
          TransformAxis rotation1: coordinates=XoR2_ankle_angle_l axis=(0 0 1) LinearFunction(coefficients=1 0)
  ConstraintSet:
    PointConstraint right_foot_point: isDisabled=true body_1=calcn_r body_2=XoR2_foot_r location_body_1=(0 0 0)
        location_body_2=(-0.08 -0.085 -0.085)
    PointConstraint left_foot_point: isDisabled=true body_1=calcn_l body_2=XoR2_foot_l location_body_1=(0 0 0)
        location_body_2=(-0.08 -0.085 0.085)
    WeldConstraint right_foot_weld: isDisabled=true body_1=calcn_r body_2=XoR2_foot_r location_body_1=(0 0 0)
        orientation_body_1=(0 0 0) location_body_2=(-0.08 -0.085 -0.085) orientation_body_2=(0 0 0)
    WeldConstraint left_foot_weld: isDisabled=true body_1=calcn_l body_2=XoR2_foot_l location_body_1=(0 0 0)
        orientation_body_1=(0 0 0) location_body_2=(-0.08 -0.085 0.085) orientation_body_2=(0 0 0)
    WeldConstraint pelvis_weld: isDisabled=true body_1=XoR2_back body_2=pelvis
        location_body_1=(0.00248223 -0.0342433 0.000353003) orientation_body_1=(0 0 0) location_body_2=(-0.17 0.06 0)
        orientation_body_2=(0 0 0)
    CoordinateCouplerConstraint add_r: isDisabled=true independent_coordinate_names=hip_adduction_r
        dependent_coordinate_name=XoR2_hip_adduction_r
        coupled_coordinates_function=LinearFunction(coefficients=1 0.0523599)
    CoordinateCouplerConstraint add_l: isDisabled=true independent_coordinate_names=hip_adduction_l
        dependent_coordinate_name=XoR2_hip_adduction_l
        coupled_coordinates_function=LinearFunction(coefficients=1 0.0523599)
    CoordinateCouplerConstraint hip_flex_r: isDisabled=true independent_coordinate_names=hip_flexion_r
        dependent_coordinate_name=XoR2_hip_angle_r coupled_coordinates_function=LinearFunction(coefficients=1 0)
    CoordinateCouplerConstraint hip_flex_l: isDisabled=true independent_coordinate_names=hip_flexion_l
        dependent_coordinate_name=XoR2_hip_angle_l coupled_coordinates_function=LinearFunction(coefficients=1 0)
    CoordinateCouplerConstraint knee_r: isDisabled=true independent_coordinate_names=knee_angle_r
        dependent_coordinate_name=XoR2_knee_angle_r
        coupled_coordinates_function=LinearFunction(coefficients=1 0.174533)
    CoordinateCouplerConstraint knee_l: isDisabled=true independent_coordinate_names=knee_angle_l
        dependent_coordinate_name=XoR2_knee_angle_l
        coupled_coordinates_function=LinearFunction(coefficients=1 0.174533)
    CoordinateCouplerConstraint ankle_r: isDisabled=true independent_coordinate_names=ankle_angle_r
        dependent_coordinate_name=XoR2_ankle_angle_r
        coupled_coordinates_function=LinearFunction(coefficients=1 -0.261799)
    CoordinateCouplerConstraint ankle_l: isDisabled=true independent_coordinate_names=ankle_angle_l
        dependent_coordinate_name=XoR2_ankle_angle_l
        coupled_coordinates_function=LinearFunction(coefficients=1 -0.261799)
  ForceSet:
    BushingForce [values shared by the 7 below unless stated]: orientation_body_1=(0 0 0) orientation_body_2=(0 0 0)
        rotational_stiffness=(0 0 0) [Nm/rad] rotational_damping=(0 0 0) [Nm/(rad/s)]
    BushingForce LeftFootBushing: isDisabled=true body_1=calcn_l body_2=XoR2_foot_l location_body_1=(0 0 0)
        location_body_2=(-0.08 -0.085 0.085) translational_stiffness=(1000 1000 1000) [N/m]
        translational_damping=(1 1 1) [N/(m/s)]
    BushingForce RightFootBushing: isDisabled=true body_1=calcn_r body_2=XoR2_foot_r location_body_1=(0 0 0)
        location_body_2=(-0.08 -0.085 -0.085) translational_stiffness=(1000 1000 1000) translational_damping=(1 1 1)
    BushingForce PelvisBushing: isDisabled=true body_1=XoR2_back body_2=pelvis
        location_body_1=(0.00248223 -0.0342433 0.000353003) location_body_2=(-0.0993585 0.0455374 0.000153626)
        translational_stiffness=(100000 100000 100000) translational_damping=(0 0 0)
    BushingForce LeftThighBushing: body_1=XoR2_thigh_l body_2=femur_l location_body_1=(-0.0151018 -0.188505 0.0563305)
        location_body_2=(0.00709862 -0.218781 -0.0501948) translational_stiffness=(5000 5000 5000)
        translational_damping=(10 10 10)
    BushingForce LeftShankBushing: body_1=XoR2_shank_l body_2=tibia_l location_body_1=(0 -0.2 0.1)
        location_body_2=(0.0264148 -0.208667 -0.0278557) translational_stiffness=(5000 5000 5000)
        translational_damping=(10 10 10)
    BushingForce RightThighBushing: body_1=XoR2_thigh_r body_2=femur_r
        location_body_1=(-0.0151018 -0.188505 -0.0563305) location_body_2=(-0.00702248 -0.229577 0.0546573)
        translational_stiffness=(1000 1000 1000) translational_damping=(1 1 1)
    BushingForce RightShankBushing: body_1=XoR2_shank_r body_2=tibia_r location_body_1=(0 -0.2 -0.1)
        location_body_2=(0.0124617 -0.211872 0.0247653) translational_stiffness=(1000 1000 1000)
        translational_damping=(1 1 1)
    Thelen2003Muscle [values shared by the 92 below unless stated]: min_control=0 max_control=1 optimal_force=1
        max_contraction_velocity=10 activation_time_constant=0.01 deactivation_time_constant=0.04
        FmaxTendonStrain=0.033 FmaxMuscleStrain=0.6 KshapeActive=0.5 KshapePassive=4 Af=0.3 Flen=1.8
    Thelen2003Muscle glut_med1_r: max_isometric_force=819 optimal_fiber_length=0.0535 tendon_slack_length=0.078
        pennation_angle_at_optimal=0.1396263 [radians]
      PathPoint P1: pelvis (-0.0408 0.0304 0.1209)
      PathPoint P2: femur_r (-0.0218 -0.0117 0.0555)
    Thelen2003Muscle glut_med2_r: max_isometric_force=573 optimal_fiber_length=0.0845 tendon_slack_length=0.053
        pennation_angle_at_optimal=0
      PathPoint P1: pelvis (-0.0855 0.0445 0.0766)
      PathPoint P2: femur_r (-0.0258 -0.0058 0.0527)
    Thelen2003Muscle glut_med3_r: max_isometric_force=653 optimal_fiber_length=0.0646 tendon_slack_length=0.053
        pennation_angle_at_optimal=0.3316126
      PathPoint P1: pelvis (-0.1223 0.0105 0.0648)
      PathPoint P2: femur_r (-0.0309 -0.0047 0.0518)
    Thelen2003Muscle glut_min1_r: max_isometric_force=270 optimal_fiber_length=0.068 tendon_slack_length=0.016
        pennation_angle_at_optimal=0.1745329
      PathPoint P1: pelvis (-0.0467 -0.008 0.1056)
      PathPoint P2: femur_r (-0.0072 -0.0104 0.056)
    Thelen2003Muscle glut_min2_r: max_isometric_force=285 optimal_fiber_length=0.056 tendon_slack_length=0.026
        pennation_angle_at_optimal=0
      PathPoint P1: pelvis (-0.0633 -0.0065 0.0991)
      PathPoint P2: femur_r (-0.0096 -0.0104 0.056)
    Thelen2003Muscle glut_min3_r: max_isometric_force=323 optimal_fiber_length=0.038 tendon_slack_length=0.051
        pennation_angle_at_optimal=0.01745329
      PathPoint P1: pelvis (-0.0834 -0.0063 0.0856)
      PathPoint P2: femur_r (-0.0135 -0.0083 0.055)
    Thelen2003Muscle semimem_r: max_isometric_force=1288 optimal_fiber_length=0.08 tendon_slack_length=0.359
        pennation_angle_at_optimal=0.2617994
      PathPoint P1: pelvis (-0.1192 -0.09747 0.07151)
      ConditionalPathPoint P2: tibia_r (-0.0348 -0.03519 -0.01891) range=(-0.558505 0.174533) coordinate=knee_angle_r
      PathPoint P3: tibia_r (-0.027 -0.04771 -0.01957)
    Thelen2003Muscle semiten_r: max_isometric_force=410 optimal_fiber_length=0.201 tendon_slack_length=0.2555
        pennation_angle_at_optimal=0.08726646
      PathPoint P1: pelvis (-0.12635 -0.10988 0.06039)
      ConditionalPathPoint P2: tibia_r (-0.04203 -0.02859 -0.02277) range=(-0.331613 0.174533) coordinate=knee_angle_r
      PathPoint P3: tibia_r (-0.03322 -0.05282 -0.02288)
      PathPoint P4: tibia_r (-0.0113 -0.0746 -0.0245)
      PathPoint P5: tibia_r (0.0027 -0.0956 -0.0193)
    Thelen2003Muscle bifemlh_r: max_isometric_force=896 optimal_fiber_length=0.109 tendon_slack_length=0.326
        pennation_angle_at_optimal=0
      PathPoint P1: pelvis (-0.12596 -0.10257 0.06944)
      PathPoint P2: tibia_r (-0.0301 -0.036 0.02943)
      PathPoint P3: tibia_r (-0.0234 -0.0563 0.0343)
    Thelen2003Muscle bifemsh_r: max_isometric_force=804 optimal_fiber_length=0.173 tendon_slack_length=0.089
        pennation_angle_at_optimal=0.4014257
      PathPoint P1: femur_r (0.005 -0.2111 0.0234)
      PathPoint P2: tibia_r (-0.0301 -0.036 0.02943)
      PathPoint P3: tibia_r (-0.0234 -0.0563 0.0343)
    Thelen2003Muscle sar_r: max_isometric_force=156 optimal_fiber_length=0.52 tendon_slack_length=0.1
        pennation_angle_at_optimal=0
      PathPoint P1: pelvis (-0.0153 -0.0013 0.1242)
      PathPoint P2: femur_r (-0.003 -0.3568 -0.0421)
      PathPoint P3: tibia_r (-0.0056 -0.0419 -0.0399)
      PathPoint P4: tibia_r (0.006 -0.0589 -0.0383)
      PathPoint P5: tibia_r (0.0243 -0.084 -0.0252)
    Thelen2003Muscle add_long_r: max_isometric_force=627 optimal_fiber_length=0.138 tendon_slack_length=0.11
        pennation_angle_at_optimal=0.1047198
      PathPoint P1: pelvis (-0.0316 -0.0836 0.0169)
      PathPoint P2: femur_r (0.005 -0.2111 0.0234)
    Thelen2003Muscle add_brev_r: max_isometric_force=429 optimal_fiber_length=0.133 tendon_slack_length=0.02
        pennation_angle_at_optimal=0
      PathPoint P1: pelvis (-0.0587 -0.0915 0.0164)
      PathPoint P2: femur_r (0.0009 -0.1196 0.0294)
    Thelen2003Muscle add_mag1_r: max_isometric_force=381 optimal_fiber_length=0.087 tendon_slack_length=0.06
        pennation_angle_at_optimal=0.08726646
      PathPoint P1: pelvis (-0.0732 -0.1174 0.0255)
      PathPoint P2: femur_r (-0.0045 -0.1211 0.0339)
    Thelen2003Muscle add_mag2_r: max_isometric_force=343 optimal_fiber_length=0.121 tendon_slack_length=0.12
        pennation_angle_at_optimal=0.05235988
      PathPoint P1: pelvis (-0.0831 -0.1192 0.0308)
      PathPoint P2: femur_r (0.0054 -0.2285 0.0227)
    Thelen2003Muscle add_mag3_r: max_isometric_force=488 optimal_fiber_length=0.131 tendon_slack_length=0.249
        pennation_angle_at_optimal=0.08726646
      PathPoint P1: pelvis (-0.11108 -0.11413 0.04882)
      PathPoint P2: femur_r (0.007 -0.3837 -0.0266)
    Thelen2003Muscle tfl_r: max_isometric_force=233 optimal_fiber_length=0.095 tendon_slack_length=0.425
        pennation_angle_at_optimal=0.05235988
      PathPoint P1: pelvis (-0.0311 0.0214 0.1241)
      PathPoint P2: femur_r (0.0294 -0.0995 0.0597)
      PathPoint P3: femur_r (0.0054 -0.4049 0.0357)
      PathPoint P4: tibia_r (0.006 -0.0487 0.0297)
    Thelen2003Muscle pect_r: max_isometric_force=266 optimal_fiber_length=0.1 tendon_slack_length=0.033
        pennation_angle_at_optimal=0
      PathPoint P1: pelvis (-0.0431 -0.0768 0.0451)
      PathPoint P2: femur_r (-0.0122 -0.0822 0.0253)
    Thelen2003Muscle grac_r: max_isometric_force=162 optimal_fiber_length=0.352 tendon_slack_length=0.126
        pennation_angle_at_optimal=0.05235988
      PathPoint P1: pelvis (-0.07401 -0.1187 0.02794)
      ConditionalPathPoint P2: tibia_r (-0.02657 -0.0319 -0.03774) range=(-0.436332 0.174533) coordinate=knee_angle_r
      PathPoint P3: tibia_r (-0.01943 -0.05153 -0.0358)
      PathPoint P4: tibia_r (0.006 -0.0836 -0.0228)
    Thelen2003Muscle glut_max1_r: max_isometric_force=573 optimal_fiber_length=0.142 tendon_slack_length=0.125
        pennation_angle_at_optimal=0.08726646
      PathPoint P1: pelvis (-0.1195 0.0612 0.07)
      PathPoint P2: pelvis (-0.1291 0.0012 0.0886)
      PathPoint P3: femur_r (-0.0457 -0.0248 0.0392)
      PathPoint P4: femur_r (-0.0277 -0.0566 0.047)
    Thelen2003Muscle glut_max2_r: max_isometric_force=819 optimal_fiber_length=0.147 tendon_slack_length=0.127
        pennation_angle_at_optimal=0
      PathPoint P1: pelvis (-0.1349 0.0176 0.0563)
      PathPoint P2: pelvis (-0.1376 -0.052 0.0914)
      PathPoint P3: femur_r (-0.0426 -0.053 0.0293)
      PathPoint P4: femur_r (-0.0156 -0.1016 0.0419)
    Thelen2003Muscle glut_max3_r: max_isometric_force=552 optimal_fiber_length=0.144 tendon_slack_length=0.145
        pennation_angle_at_optimal=0.08726646
      PathPoint P1: pelvis (-0.1556 -0.0314 0.0058)
      PathPoint P2: pelvis (-0.1529 -0.1052 0.0403)
      PathPoint P3: femur_r (-0.0299 -0.1041 0.0135)
      PathPoint P4: femur_r (-0.006 -0.1419 0.0411)
    Thelen2003Muscle iliacus_r: max_isometric_force=1073 optimal_fiber_length=0.1 tendon_slack_length=0.1
        pennation_angle_at_optimal=0.1221731
      PathPoint P1: pelvis (-0.0674 0.0365 0.0854)
      PathPoint P2: pelvis (-0.0258 -0.055 0.0811)
      ConditionalPathPoint P3: pelvis (-0.0288 -0.0805 0.0816) range=(-1.5708 0.785398) coordinate=hip_flexion_r
      PathPoint P4: femur_r (0.0017 -0.0543 0.0057)
      PathPoint P5: femur_r (-0.0193 -0.0621 0.0129)
    Thelen2003Muscle psoas_r: max_isometric_force=1113 optimal_fiber_length=0.1 tendon_slack_length=0.16
        pennation_angle_at_optimal=0.1396263
      PathPoint P1: pelvis (-0.0647 0.0887 0.0289)
      PathPoint P2: pelvis (-0.0238 -0.057 0.0759)
      ConditionalPathPoint P3: pelvis (-0.0288 -0.0805 0.0816) range=(-1.5708 0.785398) coordinate=hip_flexion_r
      PathPoint P4: femur_r (0.0016 -0.0507 0.0038)
      PathPoint P5: femur_r (-0.0188 -0.0597 0.0104)
    Thelen2003Muscle quad_fem_r: max_isometric_force=381 optimal_fiber_length=0.054 tendon_slack_length=0.024
        pennation_angle_at_optimal=0
      PathPoint P1: pelvis (-0.1143 -0.1151 0.052)
      PathPoint P2: femur_r (-0.0381 -0.0359 0.0366)
    Thelen2003Muscle gem_r: max_isometric_force=164 optimal_fiber_length=0.024 tendon_slack_length=0.039
        pennation_angle_at_optimal=0
      PathPoint P1: pelvis (-0.1133 -0.082 0.0714)
      PathPoint P2: femur_r (-0.0142 -0.0033 0.0443)
    Thelen2003Muscle peri_r: max_isometric_force=444 optimal_fiber_length=0.026 tendon_slack_length=0.115
        pennation_angle_at_optimal=0.1745329
      PathPoint P1: pelvis (-0.1396 0.0003 0.0235)
      PathPoint P2: pelvis (-0.1193 -0.0276 0.0657)
      PathPoint P3: femur_r (-0.0148 -0.0036 0.0437)
    Thelen2003Muscle rect_fem_r: max_isometric_force=1169 optimal_fiber_length=0.114 tendon_slack_length=0.31
        pennation_angle_at_optimal=0.08726646
      PathPoint P1: pelvis (-0.0295 -0.0311 0.0968)
      ConditionalPathPoint P2: femur_r (0.0334 -0.403 0.0019) range=(-2.61799 -1.45997) coordinate=knee_angle_r
      MovingPathPoint P3: tibia_r (0.0415344 0.0243248 0.0014) x_coordinate=knee_angle_r y_coordinate=knee_angle_r
          z_coordinate=knee_angle_r
        x_location: SimmSpline: x=(-2.0944 -1.99997 -1.5708 -1.45752 -1.39626 -1.0472 -0.698132 -0.526391 -0.349066 -0.174533 0 0.00017453 0.00034907 0.0279253 0.0872665 0.174533 2.0944)
            y=(0.0155805 0.0179938 0.0275081 0.0296564 0.0307615 0.0365695 0.0422074 0.0450902 0.048391 0.0534299 0.0617576 0.0617669 0.0617762 0.0633083 0.066994 0.0733035 0.0573481)
        y_location: SimmSpline: x=(-2.0944 -1.99997 -1.5708 -1.45752 -1.39626 -1.0472 -0.698132 -0.526391 -0.349066 -0.174533 0 0.00017453 0.00034907 0.0279253 0.0872665 0.174533 2.0944)
            y=(0.0234116 0.0237613 0.0251141 0.0252795 0.0253146 0.0249184 0.0242373 0.0238447 0.0234197 0.0227644 0.020984 0.0209814 0.0209788 0.0205225 0.0191754 0.0159554 -0.0673774)
        z_location: SimmSpline: x=(-2.0944 0.1745) y=(0.0014 0.0014)
    Thelen2003Muscle vas_med_r: max_isometric_force=1294 optimal_fiber_length=0.089 tendon_slack_length=0.126
        pennation_angle_at_optimal=0.08726646
      PathPoint P1: femur_r (0.014 -0.2099 0.0188)
      PathPoint P2: femur_r (0.0356 -0.2769 0.0009)
      ConditionalPathPoint P3: femur_r (0.037 -0.4048 -0.0125) range=(-2.61799 -1.21004) coordinate=knee_angle_r
      ConditionalPathPoint P4: femur_r (0.0274 -0.4255 -0.0131) range=(-2.61799 -1.78006) coordinate=knee_angle_r
      MovingPathPoint P5: tibia_r (0.0357484 0.023429 -0.0146) x_coordinate=knee_angle_r y_coordinate=knee_angle_r
          z_coordinate=knee_angle_r
        x_location: SimmSpline: x=(-2.0944 -1.99997 -1.5708 -1.45752 -1.39626 -1.0472 -0.698132 -0.526391 -0.349066 -0.174533 0 0.00017453 0.00034907 0.0279253 0.0872665 0.174533 2.0944)
            y=(0.00981097 0.0122243 0.0217371 0.0238851 0.0249902 0.0307959 0.0364187 0.0392871 0.0425654 0.0475764 0.0559586 0.0559681 0.0559776 0.0575419 0.0613368 0.0679503 0.0629332)
        y_location: SimmSpline: x=(-2.0944 -1.99997 -1.5708 -1.45752 -1.39626 -1.0472 -0.698132 -0.526391 -0.349066 -0.174533 0 0.00017453 0.00034907 0.0279253 0.0872665 0.174533 2.0944)
            y=(0.0224154 0.0227651 0.0241265 0.0242933 0.0243287 0.0239462 0.0233593 0.0230677 0.0228342 0.0226362 0.0217917 0.0217903 0.0217889 0.0215365 0.0206842 0.0183269 -0.0656205)
        z_location: SimmSpline: x=(-2.0944 2.0944) y=(-0.0146 -0.0146)
    Thelen2003Muscle vas_int_r: max_isometric_force=1365 optimal_fiber_length=0.087 tendon_slack_length=0.136
        pennation_angle_at_optimal=0.05235988
      PathPoint P1: femur_r (0.029 -0.1924 0.031)
      PathPoint P2: femur_r (0.0335 -0.2084 0.0285)
      ConditionalPathPoint P3: femur_r (0.0343 -0.403 0.0055) range=(-2.61799 -1.42) coordinate=knee_angle_r
      MovingPathPoint P4: tibia_r (0.0342662 0.0266387 0.0018) x_coordinate=knee_angle_r y_coordinate=knee_angle_r
          z_coordinate=knee_angle_r
        x_location: SimmSpline: x=(-2.0944 -1.99997 -1.5708 -1.45752 -1.39626 -1.0472 -0.698132 -0.526391 -0.349066 -0.174533 0 0.00017453 0.00034907 0.0279253 0.0872665 0.174533 2.0944)
            y=(0.0082733 0.0106866 0.0202042 0.022353 0.0234583 0.0292715 0.0349465 0.037871 0.0412569 0.0465287 0.0554632 0.0554735 0.0554837 0.0571717 0.061272 0.0684368 0.0648818)
        y_location: SimmSpline: x=(-2.0944 -1.99997 -1.5708 -1.45752 -1.39626 -1.0472 -0.698132 -0.526391 -0.349066 -0.174533 0 0.00017453 0.00034907 0.0279253 0.0872665 0.174533 2.0944)
            y=(0.025599 0.0259487 0.0273124 0.0274796 0.0275151 0.0271363 0.0265737 0.0263073 0.0261187 0.0260129 0.0252923 0.0252911 0.0252898 0.0250526 0.0242191 0.0218288 -0.0685706)
        z_location: SimmSpline: x=(-2.0944 2.0944) y=(0.0018 0.0018)
    Thelen2003Muscle vas_lat_r: max_isometric_force=1871 optimal_fiber_length=0.084 tendon_slack_length=0.157
        pennation_angle_at_optimal=0.08726646
      PathPoint P1: femur_r (0.0048 -0.1854 0.0349)
      PathPoint P2: femur_r (0.0269 -0.2591 0.0409)
      ConditionalPathPoint P3: femur_r (0.0361 -0.403 0.0205) range=(-2.61799 -1.21004) coordinate=knee_angle_r
      ConditionalPathPoint P4: femur_r (0.0253 -0.4243 0.0184) range=(-2.61799 -1.92004) coordinate=knee_angle_r
      MovingPathPoint P5: tibia_r (0.0402113 0.0224676 0.0165) x_coordinate=knee_angle_r y_coordinate=knee_angle_r
          z_coordinate=knee_angle_r
        x_location: SimmSpline: x=(-2.0944 -1.99997 -1.5708 -1.45752 -1.39626 -1.0472 -0.698132 -0.526391 -0.349066 -0.174533 0 0.00017453 0.00034907 0.0279253 0.0872665 0.174533 2.0944)
            y=(0.0142897 0.016703 0.0262145 0.0283623 0.0294674 0.0352709 0.0408785 0.0437291 0.0469704 0.0518742 0.0599557 0.0599647 0.0599738 0.0614577 0.0650351 0.0711867 0.0583766)
        y_location: SimmSpline: x=(-2.0944 -1.99997 -1.5708 -1.45752 -1.39626 -1.0472 -0.698132 -0.526391 -0.349066 -0.174533 0 0.00017453 0.00034907 0.0279253 0.0872665 0.174533 2.0944)
            y=(0.0215318 0.0218815 0.0232362 0.0234019 0.0234371 0.0230439 0.0223842 0.0220151 0.0216359 0.0210971 0.0195864 0.0195842 0.019582 0.01919 0.018008 0.0151073 -0.0653421)
        z_location: SimmSpline: x=(-2.0944 2.0944) y=(0.0165 0.0165)
    Thelen2003Muscle med_gas_r: max_isometric_force=1558 optimal_fiber_length=0.06 tendon_slack_length=0.39
        pennation_angle_at_optimal=0.296706
      PathPoint P1: femur_r (-0.019 -0.3929 -0.0235)
      ConditionalPathPoint P2: femur_r (-0.03 -0.4022 -0.0258) range=(-0.785398 0.174533) coordinate=knee_angle_r
      PathPoint P3: calcn_r (0 0.031 -0.0053)
    Thelen2003Muscle lat_gas_r: max_isometric_force=683 optimal_fiber_length=0.064 tendon_slack_length=0.38
        pennation_angle_at_optimal=0.1396263
      PathPoint P1: femur_r (-0.022 -0.3946 0.0272)
      ConditionalPathPoint P2: femur_r (-0.03 -0.4018 0.0274) range=(-0.785398 0.174533) coordinate=knee_angle_r
      PathPoint P3: calcn_r (0 0.031 -0.0053)
    Thelen2003Muscle soleus_r: max_isometric_force=3549 optimal_fiber_length=0.05 tendon_slack_length=0.25
        pennation_angle_at_optimal=0.4363323
      PathPoint P1: tibia_r (-0.0024 -0.1533 0.0071)
      PathPoint P2: calcn_r (0 0.031 -0.0053)
    Thelen2003Muscle tib_post_r: max_isometric_force=1588 optimal_fiber_length=0.031 tendon_slack_length=0.31
        pennation_angle_at_optimal=0.2094395
      PathPoint P1: tibia_r (-0.0094 -0.1348 0.0019)
      PathPoint P2: tibia_r (-0.0144 -0.4051 -0.0229)
      PathPoint P3: calcn_r (0.0417 0.0334 -0.0286)
      PathPoint P4: calcn_r (0.0772 0.0159 -0.0281)
    Thelen2003Muscle flex_dig_r: max_isometric_force=310 optimal_fiber_length=0.034 tendon_slack_length=0.4
        pennation_angle_at_optimal=0.1221731
      PathPoint P1: tibia_r (-0.0083 -0.2046 -0.0018)
      PathPoint P2: tibia_r (-0.0154 -0.4051 -0.0196)
      PathPoint P3: calcn_r (0.0436 0.0315 -0.028)
      PathPoint P4: calcn_r (0.0708 0.0176 -0.0263)
      PathPoint P5: calcn_r (0.1658 -0.0081 0.0116)
      PathPoint P6: toes_r (-0.0019 -0.0078 0.0147)
      PathPoint P7: toes_r (0.0285 -0.0071 0.0215)
      PathPoint P8: toes_r (0.0441 -0.006 0.0242)
    Thelen2003Muscle flex_hal_r: max_isometric_force=322 optimal_fiber_length=0.043 tendon_slack_length=0.38
        pennation_angle_at_optimal=0.1745329
      PathPoint P1: tibia_r (-0.0079 -0.2334 0.0244)
      PathPoint P2: tibia_r (-0.0186 -0.4079 -0.0174)
      PathPoint P3: calcn_r (0.0374 0.0276 -0.0241)
      PathPoint P4: calcn_r (0.1038 0.0068 -0.0256)
      PathPoint P5: calcn_r (0.1726 -0.0053 -0.0269)
      PathPoint P6: toes_r (0.0155 -0.0064 -0.0265)
      PathPoint P7: toes_r (0.0562 -0.0102 -0.0181)
    Thelen2003Muscle tib_ant_r: max_isometric_force=905 optimal_fiber_length=0.098 tendon_slack_length=0.223
        pennation_angle_at_optimal=0.08726646
      PathPoint P1: tibia_r (0.0179 -0.1624 0.0115)
      PathPoint P2: tibia_r (0.0329 -0.3951 -0.0177)
      PathPoint P3: calcn_r (0.1166 0.0178 -0.0305)
    Thelen2003Muscle per_brev_r: max_isometric_force=435 optimal_fiber_length=0.05 tendon_slack_length=0.161
        pennation_angle_at_optimal=0.08726646
      PathPoint P1: tibia_r (-0.007 -0.2646 0.0325)
      PathPoint P2: tibia_r (-0.0198 -0.4184 0.0283)
      PathPoint P3: tibia_r (-0.0144 -0.4295 0.0289)
      PathPoint P4: calcn_r (0.0471 0.027 0.0233)
      PathPoint P5: calcn_r (0.0677 0.0219 0.0343)
    Thelen2003Muscle per_long_r: max_isometric_force=943 optimal_fiber_length=0.049 tendon_slack_length=0.345
        pennation_angle_at_optimal=0.1745329
      PathPoint P1: tibia_r (0.0005 -0.1568 0.0362)
      PathPoint P2: tibia_r (-0.0207 -0.4205 0.0286)
      PathPoint P3: tibia_r (-0.0162 -0.4319 0.0289)
      PathPoint P4: calcn_r (0.0438 0.023 0.0221)
      PathPoint P5: calcn_r (0.0681 0.0106 0.0284)
      PathPoint P6: calcn_r (0.0852 0.0069 0.0118)
      PathPoint P7: calcn_r (0.1203 0.0085 -0.0184)
    Thelen2003Muscle per_tert_r: max_isometric_force=180 optimal_fiber_length=0.079 tendon_slack_length=0.1
        pennation_angle_at_optimal=0.2268928
      PathPoint P1: tibia_r (0.001 -0.2804 0.0231)
      PathPoint P2: tibia_r (0.0229 -0.4069 0.0159)
      PathPoint P3: calcn_r (0.0857 0.0228 0.0299)
    Thelen2003Muscle ext_dig_r: max_isometric_force=512 optimal_fiber_length=0.102 tendon_slack_length=0.345
        pennation_angle_at_optimal=0.1396263
      PathPoint P1: tibia_r (0.0032 -0.1381 0.0276)
      PathPoint P2: tibia_r (0.0289 -0.4007 0.0072)
      PathPoint P3: calcn_r (0.0922 0.0388 -0.0001)
      PathPoint P4: calcn_r (0.1616 0.0055 0.013)
      PathPoint P5: toes_r (0.0003 0.0047 0.0153)
      PathPoint P6: toes_r (0.0443 -0.0004 0.025)
    Thelen2003Muscle ext_hal_r: max_isometric_force=162 optimal_fiber_length=0.111 tendon_slack_length=0.305
        pennation_angle_at_optimal=0.1047198
      PathPoint P1: tibia_r (0.0012 -0.1767 0.0228)
      PathPoint P2: tibia_r (0.0326 -0.3985 -0.0085)
      PathPoint P3: calcn_r (0.097 0.0389 -0.0211)
      PathPoint P4: calcn_r (0.1293 0.0309 -0.0257)
      PathPoint P5: calcn_r (0.1734 0.0139 -0.028)
      PathPoint P6: toes_r (0.0298 0.0041 -0.0245)
      PathPoint P7: toes_r (0.0563 0.0034 -0.0186)
    Thelen2003Muscle glut_med1_l: max_isometric_force=819 optimal_fiber_length=0.0535 tendon_slack_length=0.078
        pennation_angle_at_optimal=0.1396263
      PathPoint P1: pelvis (-0.0408 0.0304 -0.1209)
      PathPoint P2: femur_l (-0.0218 -0.0117 -0.0555)
    Thelen2003Muscle glut_med2_l: max_isometric_force=573 optimal_fiber_length=0.0845 tendon_slack_length=0.053
        pennation_angle_at_optimal=0
      PathPoint P1: pelvis (-0.0855 0.0445 -0.0766)
      PathPoint P2: femur_l (-0.0258 -0.0058 -0.0527)
    Thelen2003Muscle glut_med3_l: max_isometric_force=653 optimal_fiber_length=0.0646 tendon_slack_length=0.053
        pennation_angle_at_optimal=0.3316126
      PathPoint P1: pelvis (-0.1223 0.0105 -0.0648)
      PathPoint P2: femur_l (-0.0309 -0.0047 -0.0518)
    Thelen2003Muscle glut_min1_l: max_isometric_force=270 optimal_fiber_length=0.068 tendon_slack_length=0.016
        pennation_angle_at_optimal=0.1745329
      PathPoint P1: pelvis (-0.0467 -0.008 -0.1056)
      PathPoint P2: femur_l (-0.0072 -0.0104 -0.056)
    Thelen2003Muscle glut_min2_l: max_isometric_force=285 optimal_fiber_length=0.056 tendon_slack_length=0.026
        pennation_angle_at_optimal=0
      PathPoint P1: pelvis (-0.0633 -0.0065 -0.0991)
      PathPoint P2: femur_l (-0.0096 -0.0104 -0.056)
    Thelen2003Muscle glut_min3_l: max_isometric_force=323 optimal_fiber_length=0.038 tendon_slack_length=0.051
        pennation_angle_at_optimal=0.01745329
      PathPoint P1: pelvis (-0.0834 -0.0063 -0.0856)
      PathPoint P2: femur_l (-0.0135 -0.0083 -0.055)
    Thelen2003Muscle semimem_l: max_isometric_force=1288 optimal_fiber_length=0.08 tendon_slack_length=0.359
        pennation_angle_at_optimal=0.2617994
      PathPoint P1: pelvis (-0.1192 -0.09747 -0.07151)
      ConditionalPathPoint P2: tibia_l (-0.0348 -0.03519 0.01891) range=(-0.558505 0.174533) coordinate=knee_angle_l
      PathPoint P3: tibia_l (-0.027 -0.04771 0.01957)
    Thelen2003Muscle semiten_l: max_isometric_force=410 optimal_fiber_length=0.201 tendon_slack_length=0.2555
        pennation_angle_at_optimal=0.08726646
      PathPoint P1: pelvis (-0.12635 -0.10988 -0.06039)
      ConditionalPathPoint P2: tibia_l (-0.04203 -0.02859 0.02277) range=(-0.331613 0.174533) coordinate=knee_angle_l
      PathPoint P3: tibia_l (-0.03322 -0.05282 0.02288)
      PathPoint P4: tibia_l (-0.0113 -0.0746 0.0245)
      PathPoint P5: tibia_l (0.0027 -0.0956 0.0193)
    Thelen2003Muscle bifemlh_l: max_isometric_force=896 optimal_fiber_length=0.109 tendon_slack_length=0.326
        pennation_angle_at_optimal=0
      PathPoint P1: pelvis (-0.12596 -0.10257 -0.06944)
      PathPoint P2: tibia_l (-0.0301 -0.036 -0.02943)
      PathPoint P3: tibia_l (-0.0234 -0.0563 -0.0343)
    Thelen2003Muscle bifemsh_l: max_isometric_force=804 optimal_fiber_length=0.173 tendon_slack_length=0.089
        pennation_angle_at_optimal=0.4014257
      PathPoint P1: femur_l (0.005 -0.2111 -0.0234)
      PathPoint P2: tibia_l (-0.0301 -0.036 -0.02943)
      PathPoint P3: tibia_l (-0.0234 -0.0563 -0.0343)
    Thelen2003Muscle sar_l: max_isometric_force=156 optimal_fiber_length=0.52 tendon_slack_length=0.1
        pennation_angle_at_optimal=0
      PathPoint P1: pelvis (-0.0153 -0.0013 -0.1242)
      PathPoint P2: femur_l (-0.003 -0.3568 0.0421)
      PathPoint P3: tibia_l (-0.0056 -0.0419 0.0399)
      PathPoint P4: tibia_l (0.006 -0.0589 0.0383)
      PathPoint P5: tibia_l (0.0243 -0.084 0.0252)
    Thelen2003Muscle add_long_l: max_isometric_force=627 optimal_fiber_length=0.138 tendon_slack_length=0.11
        pennation_angle_at_optimal=0.1047198
      PathPoint P1: pelvis (-0.0316 -0.0836 -0.0169)
      PathPoint P2: femur_l (0.005 -0.2111 -0.0234)
    Thelen2003Muscle add_brev_l: max_isometric_force=429 optimal_fiber_length=0.133 tendon_slack_length=0.02
        pennation_angle_at_optimal=0
      PathPoint P1: pelvis (-0.0587 -0.0915 -0.0164)
      PathPoint P2: femur_l (0.0009 -0.1196 -0.0294)
    Thelen2003Muscle add_mag1_l: max_isometric_force=381 optimal_fiber_length=0.087 tendon_slack_length=0.06
        pennation_angle_at_optimal=0.08726646
      PathPoint P1: pelvis (-0.0732 -0.1174 -0.0255)
      PathPoint P2: femur_l (-0.0045 -0.1211 -0.0339)
    Thelen2003Muscle add_mag2_l: max_isometric_force=343 optimal_fiber_length=0.121 tendon_slack_length=0.12
        pennation_angle_at_optimal=0.05235988
      PathPoint P1: pelvis (-0.0831 -0.1192 -0.0308)
      PathPoint P2: femur_l (0.0054 -0.2285 -0.0227)
    Thelen2003Muscle add_mag3_l: max_isometric_force=488 optimal_fiber_length=0.131 tendon_slack_length=0.249
        pennation_angle_at_optimal=0.08726646
      PathPoint P1: pelvis (-0.11108 -0.11413 -0.04882)
      PathPoint P2: femur_l (0.007 -0.3837 0.0266)
    Thelen2003Muscle tfl_l: max_isometric_force=233 optimal_fiber_length=0.095 tendon_slack_length=0.425
        pennation_angle_at_optimal=0.05235988
      PathPoint P1: pelvis (-0.0311 0.0214 -0.1241)
      PathPoint P2: femur_l (0.0294 -0.0995 -0.0597)
      PathPoint P3: femur_l (0.0054 -0.4049 -0.0357)
      PathPoint P4: tibia_l (0.006 -0.0487 -0.0297)
    Thelen2003Muscle pect_l: max_isometric_force=266 optimal_fiber_length=0.1 tendon_slack_length=0.033
        pennation_angle_at_optimal=0
      PathPoint P1: pelvis (-0.0431 -0.0768 -0.0451)
      PathPoint P2: femur_l (-0.0122 -0.0822 -0.0253)
    Thelen2003Muscle grac_l: max_isometric_force=162 optimal_fiber_length=0.352 tendon_slack_length=0.126
        pennation_angle_at_optimal=0.05235988
      PathPoint P1: pelvis (-0.07401 -0.1187 -0.02794)
      ConditionalPathPoint P2: tibia_l (-0.02657 -0.0319 0.03774) range=(-0.436332 0.174533) coordinate=knee_angle_l
      PathPoint P3: tibia_l (-0.01943 -0.05153 0.0358)
      PathPoint P4: tibia_l (0.006 -0.0836 0.0228)
    Thelen2003Muscle glut_max1_l: max_isometric_force=573 optimal_fiber_length=0.142 tendon_slack_length=0.125
        pennation_angle_at_optimal=0.08726646
      PathPoint P1: pelvis (-0.1195 0.0612 -0.07)
      PathPoint P2: pelvis (-0.1291 0.0012 -0.0886)
      PathPoint P3: femur_l (-0.0457 -0.0248 -0.0392)
      PathPoint P4: femur_l (-0.0277 -0.0566 -0.047)
    Thelen2003Muscle glut_max2_l: max_isometric_force=819 optimal_fiber_length=0.147 tendon_slack_length=0.127
        pennation_angle_at_optimal=0
      PathPoint P1: pelvis (-0.1349 0.0176 -0.0563)
      PathPoint P2: pelvis (-0.1376 -0.052 -0.0914)
      PathPoint P3: femur_l (-0.0426 -0.053 -0.0293)
      PathPoint P4: femur_l (-0.0156 -0.1016 -0.0419)
    Thelen2003Muscle glut_max3_l: max_isometric_force=552 optimal_fiber_length=0.144 tendon_slack_length=0.145
        pennation_angle_at_optimal=0.08726646
      PathPoint P1: pelvis (-0.1556 -0.0314 -0.0058)
      PathPoint P2: pelvis (-0.1529 -0.1052 -0.0403)
      PathPoint P3: femur_l (-0.0299 -0.1041 -0.0135)
      PathPoint P4: femur_l (-0.006 -0.1419 -0.0411)
    Thelen2003Muscle iliacus_l: max_isometric_force=1073 optimal_fiber_length=0.1 tendon_slack_length=0.1
        pennation_angle_at_optimal=0.1221731
      PathPoint P1: pelvis (-0.0674 0.0365 -0.0854)
      PathPoint P2: pelvis (-0.0258 -0.055 -0.0811)
      ConditionalPathPoint P3: pelvis (-0.0288 -0.0805 -0.0816) range=(-1.5708 0.785398) coordinate=hip_flexion_l
      PathPoint P4: femur_l (0.0017 -0.0543 -0.0057)
      PathPoint P5: femur_l (-0.0193 -0.0621 -0.0129)
    Thelen2003Muscle psoas_l: max_isometric_force=1113 optimal_fiber_length=0.1 tendon_slack_length=0.16
        pennation_angle_at_optimal=0.1396263
      PathPoint P1: pelvis (-0.0647 0.0887 -0.0289)
      PathPoint P2: pelvis (-0.0238 -0.057 -0.0759)
      ConditionalPathPoint P3: pelvis (-0.0288 -0.0805 -0.0816) range=(-1.5708 0.785398) coordinate=hip_flexion_l
      PathPoint P4: femur_l (0.0016 -0.0507 -0.0038)
      PathPoint P5: femur_l (-0.0188 -0.0597 -0.0104)
    Thelen2003Muscle quad_fem_l: max_isometric_force=381 optimal_fiber_length=0.054 tendon_slack_length=0.024
        pennation_angle_at_optimal=0
      PathPoint P1: pelvis (-0.1143 -0.1151 -0.052)
      PathPoint P2: femur_l (-0.0381 -0.0359 -0.0366)
    Thelen2003Muscle gem_l: max_isometric_force=164 optimal_fiber_length=0.024 tendon_slack_length=0.039
        pennation_angle_at_optimal=0
      PathPoint P1: pelvis (-0.1133 -0.082 -0.0714)
      PathPoint P2: femur_l (-0.0142 -0.0033 -0.0443)
    Thelen2003Muscle peri_l: max_isometric_force=444 optimal_fiber_length=0.026 tendon_slack_length=0.115
        pennation_angle_at_optimal=0.1745329
      PathPoint P1: pelvis (-0.1396 0.0003 -0.0235)
      PathPoint P2: pelvis (-0.1193 -0.0276 -0.0657)
      PathPoint P3: femur_l (-0.0148 -0.0036 -0.0437)
    Thelen2003Muscle rect_fem_l: max_isometric_force=1169 optimal_fiber_length=0.114 tendon_slack_length=0.31
        pennation_angle_at_optimal=0.08726646
      PathPoint P1: pelvis (-0.0295 -0.0311 -0.0968)
      ConditionalPathPoint P2: femur_l (0.0334 -0.403 -0.0019) range=(-2.61799 -1.45997) coordinate=knee_angle_l
      MovingPathPoint P3: tibia_l (0.0532409 0.0227941 -0.0014) x_coordinate=knee_angle_l y_coordinate=knee_angle_l
          z_coordinate=knee_angle_l
        x_location: SimmSpline: x=(-2.0944 -1.99997 -1.5708 -1.45752 -1.39626 -1.0472 -0.698132 -0.526391 -0.349066 -0.174533 0 0.00017453 0.00034907 0.0279253 0.0872665 0.174533 2.0944)
            y=(0.0155805 0.0179938 0.0275081 0.0296564 0.0307615 0.0365695 0.0422074 0.0450902 0.048391 0.0534299 0.0617576 0.0617669 0.0617762 0.0633083 0.066994 0.0733035 0.0573481)
        y_location: SimmSpline: x=(-2.0944 -1.99997 -1.5708 -1.45752 -1.39626 -1.0472 -0.698132 -0.526391 -0.349066 -0.174533 0 0.00017453 0.00034907 0.0279253 0.0872665 0.174533 2.0944)
            y=(0.0234116 0.0237613 0.0251141 0.0252795 0.0253146 0.0249184 0.0242373 0.0238447 0.0234197 0.0227644 0.020984 0.0209814 0.0209788 0.0205225 0.0191754 0.0159554 -0.0673774)
        z_location: SimmSpline: x=(-2.0944 0.1745) y=(-0.0014 -0.0014)
    Thelen2003Muscle vas_med_l: max_isometric_force=1294 optimal_fiber_length=0.089 tendon_slack_length=0.126
        pennation_angle_at_optimal=0.08726646
      PathPoint P1: femur_l (0.014 -0.2099 -0.0188)
      PathPoint P2: femur_l (0.0356 -0.2769 -0.0009)
      ConditionalPathPoint P3: femur_l (0.037 -0.4048 0.0125) range=(-2.61799 -1.21004) coordinate=knee_angle_l
      ConditionalPathPoint P4: femur_l (0.0274 -0.4255 0.0131) range=(-2.61799 -1.78006) coordinate=knee_angle_l
      MovingPathPoint P5: tibia_l (0.0473881 0.0226471 0.0146) x_coordinate=knee_angle_l y_coordinate=knee_angle_l
          z_coordinate=knee_angle_l
        x_location: SimmSpline: x=(-2.0944 -1.99997 -1.5708 -1.45752 -1.39626 -1.0472 -0.698132 -0.526391 -0.349066 -0.174533 0 0.00017453 0.00034907 0.0279253 0.0872665 0.174533 2.0944)
            y=(0.00981097 0.0122243 0.0217371 0.0238851 0.0249902 0.0307959 0.0364187 0.0392871 0.0425654 0.0475764 0.0559586 0.0559681 0.0559776 0.0575419 0.0613368 0.0679503 0.0629332)
        y_location: SimmSpline: x=(-2.0944 -1.99997 -1.5708 -1.45752 -1.39626 -1.0472 -0.698132 -0.526391 -0.349066 -0.174533 0 0.00017453 0.00034907 0.0279253 0.0872665 0.174533 2.0944)
            y=(0.0224154 0.0227651 0.0241265 0.0242933 0.0243287 0.0239462 0.0233593 0.0230677 0.0228342 0.0226362 0.0217917 0.0217903 0.0217889 0.0215365 0.0206842 0.0183269 -0.0656205)
        z_location: SimmSpline: x=(-2.0944 2.0944) y=(0.0146 0.0146)
    Thelen2003Muscle vas_int_l: max_isometric_force=1365 optimal_fiber_length=0.087 tendon_slack_length=0.136
        pennation_angle_at_optimal=0.05235988
      PathPoint P1: femur_l (0.029 -0.1924 -0.031)
      PathPoint P2: femur_l (0.0335 -0.2084 -0.0285)
      ConditionalPathPoint P3: femur_l (0.0343 -0.403 -0.0055) range=(-2.61799 -1.42) coordinate=knee_angle_l
      MovingPathPoint P4: tibia_l (0.0532409 0.0227941 -0.0014) x_coordinate=knee_angle_l y_coordinate=knee_angle_l
          z_coordinate=knee_angle_l
        x_location: SimmSpline: x=(-2.0944 -1.99997 -1.5708 -1.45752 -1.39626 -1.0472 -0.698132 -0.526391 -0.349066 -0.174533 0 0.00017453 0.00034907 0.0279253 0.0872665 0.174533 2.0944)
            y=(0.0155805 0.0179938 0.0275081 0.0296564 0.0307615 0.0365695 0.0422074 0.0450902 0.048391 0.0534299 0.0617576 0.0617669 0.0617762 0.0633083 0.066994 0.0733035 0.0573481)
        y_location: SimmSpline: x=(-2.0944 -1.99997 -1.5708 -1.45752 -1.39626 -1.0472 -0.698132 -0.526391 -0.349066 -0.174533 0 0.00017453 0.00034907 0.0279253 0.0872665 0.174533 2.0944)
            y=(0.0234116 0.0237613 0.0251141 0.0252795 0.0253146 0.0249184 0.0242373 0.0238447 0.0234197 0.0227644 0.020984 0.0209814 0.0209788 0.0205225 0.0191754 0.0159554 -0.0673774)
        z_location: SimmSpline: x=(-2.0944 0.1745) y=(-0.0014 -0.0014)
    Thelen2003Muscle vas_lat_l: max_isometric_force=1871 optimal_fiber_length=0.084 tendon_slack_length=0.157
        pennation_angle_at_optimal=0.08726646
      PathPoint P1: femur_l (0.0048 -0.1854 -0.0349)
      PathPoint P2: femur_l (0.0269 -0.2591 -0.0409)
      ConditionalPathPoint P3: femur_l (0.0361 -0.403 -0.0205) range=(-2.61799 -1.21004) coordinate=knee_angle_l
      ConditionalPathPoint P4: femur_l (0.0253 -0.4243 -0.0184) range=(-2.61799 -1.92004) coordinate=knee_angle_l
      MovingPathPoint P5: tibia_l (0.0516903 0.021122 -0.0165) x_coordinate=knee_angle_l y_coordinate=knee_angle_l
          z_coordinate=knee_angle_l
        x_location: SimmSpline: x=(-2.0944 -1.99997 -1.5708 -1.45752 -1.39626 -1.0472 -0.698132 -0.526391 -0.349066 -0.174533 0 0.00017453 0.00034907 0.0279253 0.0872665 0.174533 2.0944)
            y=(0.0142897 0.016703 0.0262145 0.0283623 0.0294674 0.0352709 0.0408785 0.0437291 0.0469704 0.0518742 0.0599557 0.0599647 0.0599738 0.0614577 0.0650351 0.0711867 0.0583766)
        y_location: SimmSpline: x=(-2.0944 -1.99997 -1.5708 -1.45752 -1.39626 -1.0472 -0.698132 -0.526391 -0.349066 -0.174533 0 0.00017453 0.00034907 0.0279253 0.0872665 0.174533 2.0944)
            y=(0.0215318 0.0218815 0.0232362 0.0234019 0.0234371 0.0230439 0.0223842 0.0220151 0.0216359 0.0210971 0.0195864 0.0195842 0.019582 0.01919 0.018008 0.0151073 -0.0653421)
        z_location: SimmSpline: x=(-2.0944 2.0944) y=(-0.0165 -0.0165)
    Thelen2003Muscle med_gas_l: max_isometric_force=1558 optimal_fiber_length=0.06 tendon_slack_length=0.39
        pennation_angle_at_optimal=0.296706
      PathPoint P1: femur_l (-0.019 -0.3929 0.0235)
      ConditionalPathPoint P2: femur_l (-0.03 -0.4022 0.0258) range=(-0.785398 0.174533) coordinate=knee_angle_l
      PathPoint P3: calcn_l (0 0.031 0.0053)
    Thelen2003Muscle lat_gas_l: max_isometric_force=683 optimal_fiber_length=0.064 tendon_slack_length=0.38
        pennation_angle_at_optimal=0.1396263
      PathPoint P1: femur_l (-0.022 -0.3946 -0.0272)
      ConditionalPathPoint P2: femur_l (-0.03 -0.4018 -0.0274) range=(-0.785398 0.174533) coordinate=knee_angle_l
      PathPoint P3: calcn_l (0 0.031 0.0053)
    Thelen2003Muscle soleus_l: max_isometric_force=3549 optimal_fiber_length=0.05 tendon_slack_length=0.25
        pennation_angle_at_optimal=0.4363323
      PathPoint P1: tibia_l (-0.0024 -0.1533 -0.0071)
      PathPoint P2: calcn_l (0 0.031 0.0053)
    Thelen2003Muscle tib_post_l: max_isometric_force=1588 optimal_fiber_length=0.031 tendon_slack_length=0.31
        pennation_angle_at_optimal=0.2094395
      PathPoint P1: tibia_l (-0.0094 -0.1348 -0.0019)
      PathPoint P2: tibia_l (-0.0144 -0.4051 0.0229)
      PathPoint P3: calcn_l (0.0417 0.0334 0.0286)
      PathPoint P4: calcn_l (0.0772 0.0159 0.0281)
    Thelen2003Muscle flex_dig_l: max_isometric_force=310 optimal_fiber_length=0.034 tendon_slack_length=0.4
        pennation_angle_at_optimal=0.1221731
      PathPoint P1: tibia_l (-0.0083 -0.2046 0.0018)
      PathPoint P2: tibia_l (-0.0154 -0.4051 0.0196)
      PathPoint P3: calcn_l (0.0436 0.0315 0.028)
      PathPoint P4: calcn_l (0.0708 0.0176 0.0263)
      PathPoint P5: calcn_l (0.1658 -0.0081 -0.0116)
      PathPoint P6: toes_l (-0.0019 -0.0078 -0.0147)
      PathPoint P7: toes_l (0.0285 -0.0071 -0.0215)
      PathPoint P8: toes_l (0.0441 -0.006 -0.0242)
    Thelen2003Muscle flex_hal_l: max_isometric_force=322 optimal_fiber_length=0.043 tendon_slack_length=0.38
        pennation_angle_at_optimal=0.1745329
      PathPoint P1: tibia_l (-0.0079 -0.2334 -0.0244)
      PathPoint P2: tibia_l (-0.0186 -0.4079 0.0174)
      PathPoint P3: calcn_l (0.0374 0.0276 0.0241)
      PathPoint P4: calcn_l (0.1038 0.0068 0.0256)
      PathPoint P5: calcn_l (0.1726 -0.0053 0.0269)
      PathPoint P6: toes_l (0.0155 -0.0064 0.0265)
      PathPoint P7: toes_l (0.0562 -0.0102 0.0181)
    Thelen2003Muscle tib_ant_l: max_isometric_force=905 optimal_fiber_length=0.098 tendon_slack_length=0.223
        pennation_angle_at_optimal=0.08726646
      PathPoint P1: tibia_l (0.0179 -0.1624 -0.0115)
      PathPoint P2: tibia_l (0.0329 -0.3951 0.0177)
      PathPoint P3: calcn_l (0.1166 0.0178 0.0305)
    Thelen2003Muscle per_brev_l: max_isometric_force=435 optimal_fiber_length=0.05 tendon_slack_length=0.161
        pennation_angle_at_optimal=0.08726646
      PathPoint P1: tibia_l (-0.007 -0.2646 -0.0325)
      PathPoint P2: tibia_l (-0.0198 -0.4184 -0.0283)
      PathPoint P3: tibia_l (-0.0144 -0.4295 -0.0289)
      PathPoint P4: calcn_l (0.0471 0.027 -0.0233)
      PathPoint P5: calcn_l (0.0677 0.0219 -0.0343)
    Thelen2003Muscle per_long_l: max_isometric_force=943 optimal_fiber_length=0.049 tendon_slack_length=0.345
        pennation_angle_at_optimal=0.1745329
      PathPoint P1: tibia_l (0.0005 -0.1568 -0.0362)
      PathPoint P2: tibia_l (-0.0207 -0.4205 -0.0286)
      PathPoint P3: tibia_l (-0.0162 -0.4319 -0.0289)
      PathPoint P4: calcn_l (0.0438 0.023 -0.0221)
      PathPoint P5: calcn_l (0.0681 0.0106 -0.0284)
      PathPoint P6: calcn_l (0.0852 0.0069 -0.0118)
      PathPoint P7: calcn_l (0.1203 0.0085 0.0184)
    Thelen2003Muscle per_tert_l: max_isometric_force=180 optimal_fiber_length=0.079 tendon_slack_length=0.1
        pennation_angle_at_optimal=0.2268928
      PathPoint P1: tibia_l (0.001 -0.2804 -0.0231)
      PathPoint P2: tibia_l (0.0229 -0.4069 -0.0159)
      PathPoint P3: calcn_l (0.0857 0.0228 -0.0299)
    Thelen2003Muscle ext_dig_l: max_isometric_force=512 optimal_fiber_length=0.102 tendon_slack_length=0.345
        pennation_angle_at_optimal=0.1396263
      PathPoint P1: tibia_l (0.0032 -0.1381 -0.0276)
      PathPoint P2: tibia_l (0.0289 -0.4007 -0.0072)
      PathPoint P3: calcn_l (0.0922 0.0388 0.0001)
      PathPoint P4: calcn_l (0.1616 0.0055 -0.013)
      PathPoint P5: toes_l (0.0003 0.0047 -0.0153)
      PathPoint P6: toes_l (0.0443 -0.0004 -0.025)
    Thelen2003Muscle ext_hal_l: max_isometric_force=162 optimal_fiber_length=0.111 tendon_slack_length=0.305
        pennation_angle_at_optimal=0.1047198
      PathPoint P1: tibia_l (0.0012 -0.1767 -0.0228)
      PathPoint P2: tibia_l (0.0326 -0.3985 0.0085)
      PathPoint P3: calcn_l (0.097 0.0389 0.0211)
      PathPoint P4: calcn_l (0.1293 0.0309 0.0257)
      PathPoint P5: calcn_l (0.1734 0.0139 0.028)
      PathPoint P6: toes_l (0.0298 0.0041 0.0245)
      PathPoint P7: toes_l (0.0563 0.0034 0.0186)
    Thelen2003Muscle ercspn_r: max_isometric_force=2500 optimal_fiber_length=0.12 tendon_slack_length=0.03
        pennation_angle_at_optimal=0
      PathPoint P1: pelvis (-0.14 0.0439 0.0436)
      PathPoint P2: torso (-0.055 0.11 0.0241)
    Thelen2003Muscle ercspn_l: max_isometric_force=2500 optimal_fiber_length=0.12 tendon_slack_length=0.03
        pennation_angle_at_optimal=0
      PathPoint P1: pelvis (-0.14 0.0439 -0.0436)
      PathPoint P2: torso (-0.055 0.11 -0.0241)
    Thelen2003Muscle intobl_r: max_isometric_force=900 optimal_fiber_length=0.1 tendon_slack_length=0.1
        pennation_angle_at_optimal=0
      PathPoint P1: pelvis (-0.04 0.07 0.1157)
      PathPoint P2: torso (0.07 0.16 0.015)
    Thelen2003Muscle intobl_l: max_isometric_force=900 optimal_fiber_length=0.1 tendon_slack_length=0.1
        pennation_angle_at_optimal=0
      PathPoint P1: pelvis (-0.04 0.07 -0.1157)
      PathPoint P2: torso (0.07 0.16 -0.015)
    Thelen2003Muscle extobl_r: max_isometric_force=900 optimal_fiber_length=0.12 tendon_slack_length=0.14
        pennation_angle_at_optimal=0
      PathPoint P1: pelvis (-0.03 -0.0636 0.01)
      PathPoint P2: torso (0.065 0.11 0.11)
    Thelen2003Muscle extobl_l: max_isometric_force=900 optimal_fiber_length=0.12 tendon_slack_length=0.14
        pennation_angle_at_optimal=0
      PathPoint P1: pelvis (-0.03 -0.0636 -0.01)
      PathPoint P2: torso (0.065 0.11 -0.11)
    ObjectGroup R_hip_abd: members=(glut_max1_r glut_med1_r glut_med2_r glut_med3_r glut_min1_r glut_min2_r glut_min3_r peri_r sar_r tfl_r)
    ObjectGroup R_hip_flex: members=(add_brev_r add_long_r glut_med1_r glut_min1_r grac_r iliacus_r pect_r psoas_r rect_fem_r sar_r tfl_r)
    ObjectGroup R_hip_inrot: members=(glut_med1_r glut_min1_r iliacus_r psoas_r tfl_r)
    ObjectGroup R_hip_exrot: members=(gem_r glut_med3_r glut_min3_r peri_r quad_fem_r)
    ObjectGroup R_hip_ext: members=(add_long_r add_mag1_r add_mag2_r add_mag3_r bifemlh_r glut_max1_r glut_max2_r glut_max3_r glut_med3_r glut_min3_r semimem_r semiten_r)
    ObjectGroup R_hip_add: members=(add_brev_r add_long_r add_mag1_r add_mag2_r add_mag3_r bifemlh_r grac_r pect_r semimem_r semiten_r)
    ObjectGroup R_knee_bend: members=(bifemlh_r bifemsh_r grac_r lat_gas_r med_gas_r sar_r semimem_r semiten_r)
    ObjectGroup R_knee_ext: members=(rect_fem_r vas_int_r vas_lat_r vas_med_r)
    ObjectGroup R_ankle_pf: members=(flex_dig_r flex_hal_r lat_gas_r med_gas_r per_brev_r per_long_r soleus_r tib_post_r)
    ObjectGroup R_inverter: members=(ext_hal_r flex_dig_r flex_hal_r tib_ant_r tib_post_r)
    ObjectGroup R_ankle_df: members=(ext_dig_r ext_hal_r per_tert_r tib_ant_r)
    ObjectGroup R_everter: members=(ext_dig_r per_brev_r per_long_r per_tert_r)
    ObjectGroup L_hip_abd: members=(glut_max1_l glut_med1_l glut_med2_l glut_med3_l glut_min1_l glut_min2_l glut_min3_l peri_l sar_l tfl_l)
    ObjectGroup L_hip_flex: members=(add_brev_l add_long_l glut_med1_l glut_min1_l grac_l iliacus_l pect_l psoas_l rect_fem_l sar_l tfl_l)
    ObjectGroup L_hip_inrot: members=(glut_med1_l glut_min1_l iliacus_l psoas_l tfl_l)
    ObjectGroup L_hip_exrot: members=(gem_l glut_med3_l glut_min3_l peri_l quad_fem_l)
    ObjectGroup L_hip_ext: members=(add_long_l add_mag1_l add_mag2_l add_mag3_l bifemlh_l glut_max1_l glut_max2_l glut_max3_l glut_med3_l glut_min3_l semimem_l semiten_l)
    ObjectGroup L_hip_add: members=(add_brev_l add_long_l add_mag1_l add_mag2_l add_mag3_l bifemlh_l grac_l pect_l semimem_l semiten_l)
    ObjectGroup L_knee_bend: members=(bifemlh_l bifemsh_l grac_l lat_gas_l med_gas_l sar_l semimem_l semiten_l)
    ObjectGroup L_knee_ext: members=(rect_fem_l vas_int_l vas_lat_l vas_med_l)
    ObjectGroup L_ankle_pf: members=(flex_dig_l flex_hal_l lat_gas_l med_gas_l per_brev_l per_long_l soleus_l tib_post_l)
    ObjectGroup L_inverter: members=(ext_hal_l flex_dig_l flex_hal_l tib_ant_l tib_post_l)
    ObjectGroup L_ankle_df: members=(ext_dig_l ext_hal_l per_tert_l tib_ant_l)
    ObjectGroup L_everter: members=(ext_dig_l per_brev_l per_long_l per_tert_l)
    ObjectGroup back_ext: members=(ercspn_l ercspn_r)
    ObjectGroup back_rlb: members=(ercspn_r extobl_r intobl_r)
    ObjectGroup back_introt: members=(ercspn_r extobl_l intobl_r)
    ObjectGroup back_llb: members=(ercspn_l extobl_l intobl_l)
    ObjectGroup back_extrot: members=(ercspn_l extobl_r intobl_l)
    ObjectGroup back_flex: members=(extobl_l extobl_r intobl_l intobl_r)
  MarkerSet:
    Marker shank_strap_r: XoR2_shank_r (0 -0.2 -0.1)
    Marker thigh_strap_r: XoR2_thigh_r (-0.0151018 -0.188505 -0.0563305) fixed=true
    Marker shank_strap_l: XoR2_shank_l (0 -0.2 0.1)
    Marker thigh_strap_l: XoR2_thigh_l (-0.0151018 -0.188505 0.0563305)
    Marker pelvis_strap: pelvis (-0.0993585 0.0455374 0.000153626)
    Marker test_marker: tibia_l (0.0264148 -0.208667 -0.0278557)
  ProbeSet:
    Umberger2010MuscleMetabolicsProbe metabolics: probe_operation=value activation_maintenance_rate_on=true
        shortening_rate_on=true basal_rate_on=false mechanical_work_rate_on=true report_total_metabolics_only=false
      Umberger2010MuscleMetabolicsProbe_MetabolicMuscleParameterSet:
        Umberger2010MuscleMetabolicsProbe_MetabolicMuscleParameter glut_med1_r: ratio_slow_twitch_fibers=0.55
            use_provided_muscle_mass=false
        Umberger2010MuscleMetabolicsProbe_MetabolicMuscleParameter glut_med2_r: ratio_slow_twitch_fibers=0.55
            use_provided_muscle_mass=false
        Umberger2010MuscleMetabolicsProbe_MetabolicMuscleParameter glut_med3_r: ratio_slow_twitch_fibers=0.55
            use_provided_muscle_mass=false
        Umberger2010MuscleMetabolicsProbe_MetabolicMuscleParameter glut_min1_r: ratio_slow_twitch_fibers=0.55
            use_provided_muscle_mass=false
        Umberger2010MuscleMetabolicsProbe_MetabolicMuscleParameter glut_min2_r: ratio_slow_twitch_fibers=0.55
            use_provided_muscle_mass=false
        Umberger2010MuscleMetabolicsProbe_MetabolicMuscleParameter glut_min3_r: ratio_slow_twitch_fibers=0.55
            use_provided_muscle_mass=false
        Umberger2010MuscleMetabolicsProbe_MetabolicMuscleParameter semimem_r: ratio_slow_twitch_fibers=0.4925
            use_provided_muscle_mass=false
        Umberger2010MuscleMetabolicsProbe_MetabolicMuscleParameter semiten_r: ratio_slow_twitch_fibers=0.425
            use_provided_muscle_mass=false
        Umberger2010MuscleMetabolicsProbe_MetabolicMuscleParameter bifemlh_r: ratio_slow_twitch_fibers=0.5425
            use_provided_muscle_mass=false
        Umberger2010MuscleMetabolicsProbe_MetabolicMuscleParameter bifemsh_r: ratio_slow_twitch_fibers=0.529
            use_provided_muscle_mass=false
        Umberger2010MuscleMetabolicsProbe_MetabolicMuscleParameter sar_r: ratio_slow_twitch_fibers=0.5
            use_provided_muscle_mass=false
        Umberger2010MuscleMetabolicsProbe_MetabolicMuscleParameter add_long_r: ratio_slow_twitch_fibers=0.5
            use_provided_muscle_mass=false
        Umberger2010MuscleMetabolicsProbe_MetabolicMuscleParameter add_brev_r: ratio_slow_twitch_fibers=0.5
            use_provided_muscle_mass=false
        Umberger2010MuscleMetabolicsProbe_MetabolicMuscleParameter add_mag1_r: ratio_slow_twitch_fibers=0.552
            use_provided_muscle_mass=false
        Umberger2010MuscleMetabolicsProbe_MetabolicMuscleParameter add_mag2_r: ratio_slow_twitch_fibers=0.552
            use_provided_muscle_mass=false
        Umberger2010MuscleMetabolicsProbe_MetabolicMuscleParameter add_mag3_r: ratio_slow_twitch_fibers=0.552
            use_provided_muscle_mass=false
        Umberger2010MuscleMetabolicsProbe_MetabolicMuscleParameter tfl_r: ratio_slow_twitch_fibers=0.5
            use_provided_muscle_mass=false
        Umberger2010MuscleMetabolicsProbe_MetabolicMuscleParameter pect_r: ratio_slow_twitch_fibers=0.5
            use_provided_muscle_mass=false
        Umberger2010MuscleMetabolicsProbe_MetabolicMuscleParameter grac_r: ratio_slow_twitch_fibers=0.5
            use_provided_muscle_mass=false
        Umberger2010MuscleMetabolicsProbe_MetabolicMuscleParameter glut_max1_r: ratio_slow_twitch_fibers=0.55
            use_provided_muscle_mass=false
        Umberger2010MuscleMetabolicsProbe_MetabolicMuscleParameter glut_max2_r: ratio_slow_twitch_fibers=0.55
            use_provided_muscle_mass=false
        Umberger2010MuscleMetabolicsProbe_MetabolicMuscleParameter glut_max3_r: ratio_slow_twitch_fibers=0.55
            use_provided_muscle_mass=false
        Umberger2010MuscleMetabolicsProbe_MetabolicMuscleParameter iliacus_r: ratio_slow_twitch_fibers=0.5
            use_provided_muscle_mass=false
        Umberger2010MuscleMetabolicsProbe_MetabolicMuscleParameter psoas_r: ratio_slow_twitch_fibers=0.5
            use_provided_muscle_mass=false
        Umberger2010MuscleMetabolicsProbe_MetabolicMuscleParameter quad_fem_r: ratio_slow_twitch_fibers=0.5
            use_provided_muscle_mass=false
        Umberger2010MuscleMetabolicsProbe_MetabolicMuscleParameter gem_r: ratio_slow_twitch_fibers=0.5
            use_provided_muscle_mass=false
        Umberger2010MuscleMetabolicsProbe_MetabolicMuscleParameter peri_r: ratio_slow_twitch_fibers=0.5
            use_provided_muscle_mass=false
        Umberger2010MuscleMetabolicsProbe_MetabolicMuscleParameter rect_fem_r: ratio_slow_twitch_fibers=0.3865
            use_provided_muscle_mass=false
        Umberger2010MuscleMetabolicsProbe_MetabolicMuscleParameter vas_med_r: ratio_slow_twitch_fibers=0.503
            use_provided_muscle_mass=false
        Umberger2010MuscleMetabolicsProbe_MetabolicMuscleParameter vas_int_r: ratio_slow_twitch_fibers=0.543
            use_provided_muscle_mass=false
        Umberger2010MuscleMetabolicsProbe_MetabolicMuscleParameter vas_lat_r: ratio_slow_twitch_fibers=0.455
            use_provided_muscle_mass=false
        Umberger2010MuscleMetabolicsProbe_MetabolicMuscleParameter med_gas_r: ratio_slow_twitch_fibers=0.566
            use_provided_muscle_mass=false
        Umberger2010MuscleMetabolicsProbe_MetabolicMuscleParameter lat_gas_r: ratio_slow_twitch_fibers=0.507
            use_provided_muscle_mass=false
        Umberger2010MuscleMetabolicsProbe_MetabolicMuscleParameter soleus_r: ratio_slow_twitch_fibers=0.803
            use_provided_muscle_mass=false
        Umberger2010MuscleMetabolicsProbe_MetabolicMuscleParameter tib_post_r: ratio_slow_twitch_fibers=0.6
            use_provided_muscle_mass=false
        Umberger2010MuscleMetabolicsProbe_MetabolicMuscleParameter flex_dig_r: ratio_slow_twitch_fibers=0.6
            use_provided_muscle_mass=false
        Umberger2010MuscleMetabolicsProbe_MetabolicMuscleParameter flex_hal_r: ratio_slow_twitch_fibers=0.6
            use_provided_muscle_mass=false
        Umberger2010MuscleMetabolicsProbe_MetabolicMuscleParameter tib_ant_r: ratio_slow_twitch_fibers=0.7
            use_provided_muscle_mass=false
        Umberger2010MuscleMetabolicsProbe_MetabolicMuscleParameter per_brev_r: ratio_slow_twitch_fibers=0.6
            use_provided_muscle_mass=false
        Umberger2010MuscleMetabolicsProbe_MetabolicMuscleParameter per_long_r: ratio_slow_twitch_fibers=0.6
            use_provided_muscle_mass=false
        Umberger2010MuscleMetabolicsProbe_MetabolicMuscleParameter per_tert_r: ratio_slow_twitch_fibers=0.75
            use_provided_muscle_mass=false
        Umberger2010MuscleMetabolicsProbe_MetabolicMuscleParameter ext_dig_r: ratio_slow_twitch_fibers=0.75
            use_provided_muscle_mass=false
        Umberger2010MuscleMetabolicsProbe_MetabolicMuscleParameter ext_hal_r: ratio_slow_twitch_fibers=0.75
            use_provided_muscle_mass=false
        Umberger2010MuscleMetabolicsProbe_MetabolicMuscleParameter glut_med1_l: ratio_slow_twitch_fibers=0.55
            use_provided_muscle_mass=false
        Umberger2010MuscleMetabolicsProbe_MetabolicMuscleParameter glut_med2_l: ratio_slow_twitch_fibers=0.55
            use_provided_muscle_mass=false
        Umberger2010MuscleMetabolicsProbe_MetabolicMuscleParameter glut_med3_l: ratio_slow_twitch_fibers=0.55
            use_provided_muscle_mass=false
        Umberger2010MuscleMetabolicsProbe_MetabolicMuscleParameter glut_min1_l: ratio_slow_twitch_fibers=0.55
            use_provided_muscle_mass=false
        Umberger2010MuscleMetabolicsProbe_MetabolicMuscleParameter glut_min2_l: ratio_slow_twitch_fibers=0.55
            use_provided_muscle_mass=false
        Umberger2010MuscleMetabolicsProbe_MetabolicMuscleParameter glut_min3_l: ratio_slow_twitch_fibers=0.55
            use_provided_muscle_mass=false
        Umberger2010MuscleMetabolicsProbe_MetabolicMuscleParameter semimem_l: ratio_slow_twitch_fibers=0.4925
            use_provided_muscle_mass=false
        Umberger2010MuscleMetabolicsProbe_MetabolicMuscleParameter semiten_l: ratio_slow_twitch_fibers=0.425
            use_provided_muscle_mass=false
        Umberger2010MuscleMetabolicsProbe_MetabolicMuscleParameter bifemlh_l: ratio_slow_twitch_fibers=0.5425
            use_provided_muscle_mass=false
        Umberger2010MuscleMetabolicsProbe_MetabolicMuscleParameter bifemsh_l: ratio_slow_twitch_fibers=0.529
            use_provided_muscle_mass=false
        Umberger2010MuscleMetabolicsProbe_MetabolicMuscleParameter sar_l: ratio_slow_twitch_fibers=0.5
            use_provided_muscle_mass=false
        Umberger2010MuscleMetabolicsProbe_MetabolicMuscleParameter add_long_l: ratio_slow_twitch_fibers=0.5
            use_provided_muscle_mass=false
        Umberger2010MuscleMetabolicsProbe_MetabolicMuscleParameter add_brev_l: ratio_slow_twitch_fibers=0.5
            use_provided_muscle_mass=false
        Umberger2010MuscleMetabolicsProbe_MetabolicMuscleParameter add_mag1_l: ratio_slow_twitch_fibers=0.552
            use_provided_muscle_mass=false
        Umberger2010MuscleMetabolicsProbe_MetabolicMuscleParameter add_mag2_l: ratio_slow_twitch_fibers=0.552
            use_provided_muscle_mass=false
        Umberger2010MuscleMetabolicsProbe_MetabolicMuscleParameter add_mag3_l: ratio_slow_twitch_fibers=0.552
            use_provided_muscle_mass=false
        Umberger2010MuscleMetabolicsProbe_MetabolicMuscleParameter tfl_l: ratio_slow_twitch_fibers=0.5
            use_provided_muscle_mass=false
        Umberger2010MuscleMetabolicsProbe_MetabolicMuscleParameter pect_l: ratio_slow_twitch_fibers=0.5
            use_provided_muscle_mass=false
        Umberger2010MuscleMetabolicsProbe_MetabolicMuscleParameter grac_l: ratio_slow_twitch_fibers=0.5
            use_provided_muscle_mass=false
        Umberger2010MuscleMetabolicsProbe_MetabolicMuscleParameter glut_max1_l: ratio_slow_twitch_fibers=0.55
            use_provided_muscle_mass=false
        Umberger2010MuscleMetabolicsProbe_MetabolicMuscleParameter glut_max2_l: ratio_slow_twitch_fibers=0.55
            use_provided_muscle_mass=false
        Umberger2010MuscleMetabolicsProbe_MetabolicMuscleParameter glut_max3_l: ratio_slow_twitch_fibers=0.55
            use_provided_muscle_mass=false
        Umberger2010MuscleMetabolicsProbe_MetabolicMuscleParameter iliacus_l: ratio_slow_twitch_fibers=0.5
            use_provided_muscle_mass=false
        Umberger2010MuscleMetabolicsProbe_MetabolicMuscleParameter psoas_l: ratio_slow_twitch_fibers=0.5
            use_provided_muscle_mass=false
        Umberger2010MuscleMetabolicsProbe_MetabolicMuscleParameter quad_fem_l: ratio_slow_twitch_fibers=0.5
            use_provided_muscle_mass=false
        Umberger2010MuscleMetabolicsProbe_MetabolicMuscleParameter gem_l: ratio_slow_twitch_fibers=0.5
            use_provided_muscle_mass=false
        Umberger2010MuscleMetabolicsProbe_MetabolicMuscleParameter peri_l: ratio_slow_twitch_fibers=0.5
            use_provided_muscle_mass=false
        Umberger2010MuscleMetabolicsProbe_MetabolicMuscleParameter rect_fem_l: ratio_slow_twitch_fibers=0.3865
            use_provided_muscle_mass=false
        Umberger2010MuscleMetabolicsProbe_MetabolicMuscleParameter vas_med_l: ratio_slow_twitch_fibers=0.503
            use_provided_muscle_mass=false
        Umberger2010MuscleMetabolicsProbe_MetabolicMuscleParameter vas_int_l: ratio_slow_twitch_fibers=0.543
            use_provided_muscle_mass=false
        Umberger2010MuscleMetabolicsProbe_MetabolicMuscleParameter vas_lat_l: ratio_slow_twitch_fibers=0.455
            use_provided_muscle_mass=false
        Umberger2010MuscleMetabolicsProbe_MetabolicMuscleParameter med_gas_l: ratio_slow_twitch_fibers=0.566
            use_provided_muscle_mass=false
        Umberger2010MuscleMetabolicsProbe_MetabolicMuscleParameter lat_gas_l: ratio_slow_twitch_fibers=0.507
            use_provided_muscle_mass=false
        Umberger2010MuscleMetabolicsProbe_MetabolicMuscleParameter soleus_l: ratio_slow_twitch_fibers=0.803
            use_provided_muscle_mass=false
        Umberger2010MuscleMetabolicsProbe_MetabolicMuscleParameter tib_post_l: ratio_slow_twitch_fibers=0.6
            use_provided_muscle_mass=false
        Umberger2010MuscleMetabolicsProbe_MetabolicMuscleParameter flex_dig_l: ratio_slow_twitch_fibers=0.6
            use_provided_muscle_mass=false
        Umberger2010MuscleMetabolicsProbe_MetabolicMuscleParameter flex_hal_l: ratio_slow_twitch_fibers=0.6
            use_provided_muscle_mass=false
        Umberger2010MuscleMetabolicsProbe_MetabolicMuscleParameter tib_ant_l: ratio_slow_twitch_fibers=0.7
            use_provided_muscle_mass=false
        Umberger2010MuscleMetabolicsProbe_MetabolicMuscleParameter per_brev_l: ratio_slow_twitch_fibers=0.6
            use_provided_muscle_mass=false
        Umberger2010MuscleMetabolicsProbe_MetabolicMuscleParameter per_long_l: ratio_slow_twitch_fibers=0.6
            use_provided_muscle_mass=false
        Umberger2010MuscleMetabolicsProbe_MetabolicMuscleParameter per_tert_l: ratio_slow_twitch_fibers=0.75
            use_provided_muscle_mass=false
        Umberger2010MuscleMetabolicsProbe_MetabolicMuscleParameter ext_dig_l: ratio_slow_twitch_fibers=0.75
            use_provided_muscle_mass=false
        Umberger2010MuscleMetabolicsProbe_MetabolicMuscleParameter ext_hal_l: ratio_slow_twitch_fibers=0.75
            use_provided_muscle_mass=false
        Umberger2010MuscleMetabolicsProbe_MetabolicMuscleParameter ercspn_r: ratio_slow_twitch_fibers=0.6
            use_provided_muscle_mass=false
        Umberger2010MuscleMetabolicsProbe_MetabolicMuscleParameter ercspn_l: ratio_slow_twitch_fibers=0.6
            use_provided_muscle_mass=false
        Umberger2010MuscleMetabolicsProbe_MetabolicMuscleParameter intobl_r: ratio_slow_twitch_fibers=0.56
            use_provided_muscle_mass=false
        Umberger2010MuscleMetabolicsProbe_MetabolicMuscleParameter intobl_l: ratio_slow_twitch_fibers=0.56
            use_provided_muscle_mass=false
        Umberger2010MuscleMetabolicsProbe_MetabolicMuscleParameter extobl_r: ratio_slow_twitch_fibers=0.58
            use_provided_muscle_mass=false
        Umberger2010MuscleMetabolicsProbe_MetabolicMuscleParameter extobl_l: ratio_slow_twitch_fibers=0.58
            use_provided_muscle_mass=false
