# OpenSim document version 20302
rdCMC_TaskSet gait2392_CMC:
  rdCMC_Joint [values shared by the 31 below unless stated]: weight=(1 1 1) wrt_body=-1 express_body=-1
      active=(true false false) kp=(100 1 1) kv=(20 1 1) ka=(1 1 1) r0=(0 0 0) r1=(0 0 0) r2=(0 0 0) limit=0
  rdCMC_Joint pelvis_tz: coordinate=pelvis_tz
  rdCMC_Joint pelvis_tx: coordinate=pelvis_tx
  rdCMC_Joint pelvis_ty: coordinate=pelvis_ty
  rdCMC_Joint pelvis_tilt: coordinate=pelvis_tilt
  rdCMC_Joint pelvis_list: coordinate=pelvis_list
  rdCMC_Joint pelvis_rotation: coordinate=pelvis_rotation
  rdCMC_Joint hip_flexion_r: coordinate=hip_flexion_r
  rdCMC_Joint hip_adduction_r: weight=(0.1 0.1 0.1) coordinate=hip_adduction_r
  rdCMC_Joint hip_rotation_r: coordinate=hip_rotation_r
  rdCMC_Joint knee_angle_r: coordinate=knee_angle_r
  rdCMC_Joint ankle_angle_r: coordinate=ankle_angle_r
  rdCMC_Joint hip_flexion_l: coordinate=hip_flexion_l
  rdCMC_Joint hip_adduction_l: weight=(0.1 0.1 0.1) coordinate=hip_adduction_l
  rdCMC_Joint hip_rotation_l: coordinate=hip_rotation_l
  rdCMC_Joint knee_angle_l: coordinate=knee_angle_l
  rdCMC_Joint ankle_angle_l: coordinate=ankle_angle_l
  rdCMC_Joint lumbar_extension: coordinate=lumbar_extension
  rdCMC_Joint lumbar_bending: coordinate=lumbar_bending
  rdCMC_Joint lumbar_rotation: coordinate=lumbar_rotation
  rdCMC_Joint XoR2_tz: weight=(0.1 0.1 0.1) coordinate=XoR2_tz
  rdCMC_Joint XoR2_tx: weight=(0.1 0.1 0.1) coordinate=XoR2_tx
  rdCMC_Joint XoR2_ty: weight=(0.1 0.1 0.1) coordinate=XoR2_ty
  rdCMC_Joint XoR2_tilt: weight=(0.1 0.1 0.1) coordinate=XoR2_tilt
  rdCMC_Joint XoR2_list: weight=(0.1 0.1 0.1) coordinate=XoR2_list
  rdCMC_Joint XoR2_rotation: weight=(0.1 0.1 0.1) coordinate=XoR2_rotation
  rdCMC_Joint XoR2_hip_angle_r: coordinate=XoR2_hip_angle_r
  rdCMC_Joint XoR2_knee_angle_r: coordinate=XoR2_knee_angle_r
  rdCMC_Joint XoR2_ankle_angle_r: coordinate=XoR2_ankle_angle_r
  rdCMC_Joint XoR2_hip_angle_l: coordinate=XoR2_hip_angle_l
  rdCMC_Joint XoR2_knee_angle_l: coordinate=XoR2_knee_angle_l
  rdCMC_Joint XoR2_ankle_angle_l: coordinate=XoR2_ankle_angle_l
